tonf := 1000*kgf
f_c := 250*kgf/cm^2
f_y := 4200*kgf/cm^2
ε_cu := 0.003
ε_y := 0.0021
h := 50*cm  # Altura de viga
rec := 40*mm
b := 30*cm  # Ancho de viga
d := h - rec
d =  # no stored result
# 1. Flexión
M_u := 26.22*tonf*m
β_1 :=
    if f_c < 30*MPa
        0.85
    also if f_c > 55*MPa
        0.65
    else
        0.85 - 0.008*(f_c/MPa - 30)
β_1 =  # no stored result
ρ := 0.001
ϕ := 0.9
solve block
    M_u/(b*d^2) == ϕ*ρ*f_y*(1 - 0.588*ρ*f_y/f_c)
    NL := Find(ρ)
end solve block
ρ := NL
ρ =  # no stored result
ρ_min := max(0.25*sqrt(f_c*MPa)/f_y, 1.4*MPa/f_y)
ρ_min =  # no stored result
ρ_b := 0.85*β_1*f_c/f_y*ε_cu/(ε_cu + ε_y)
ρ_b =  # no stored result
ρ_max := 0.75*ρ_b
ρ_max =  # no stored result
ρ_req := max(min(ρ, ρ_max), ρ_min)
ρ_req =  # no stored result
A_sreq := ρ_req*b*d
A_sreq =  # no stored result
# 2. Corte
ϕ := 0.75
V_u := 16.17*tonf
f_yt := 420*MPa
V_c := 0.53*sqrt(f_c*kgf/cm^2)*b*d
V_c = tonf  # (S. 11.1.3, Corte a Flexión pura)
(V_u/ϕ - V_c)/(f_yt*d) =  # no stored result
s := 20*cm
ϕ_v := 10*mm
n := 2
A_v := n*ϕ_v^2*π/4
A_v =  # no stored result
V_s := min(A_v*f_yt*d/s, 0.66*sqrt(f_c*MPa)*b*d)
V_s = tonf
V_n := V_c + V_s
V_n = tonf
ϕ*V_n = tonf
