tonf := 1000*kgf
f_c := 250*kgf/cm^2
f_y := 4200*kgf/cm^2
h := 14*cm  # Altura de viga
rec := 20*mm
b := 100*cm  # Ancho de viga
d := h - rec
d =  # no stored result
# 1. Flexión
M_u := 2.1*tonf*m
β_1 :=
    if f_c < 30*MPa
        0.85
    also if f_c > 55*MPa
        0.65
    else
        0.85 - 0.008*(f_c/MPa - 30)
β_1 =  # no stored result
ρ := 0.001
ϕ := 0.9
solve block
    M_u/(b*d^2) == ϕ*ρ*f_y*(1 - 0.588*ρ*f_y/f_c)
    NL := Find(ρ)
end solve block
ρ := NL
ρ =  # no stored result
A_sreq := ρ*b*d
A_sreq =  # no stored result
