# Diseño de Losas
# Nivel -1  e := 17 cm  s_max := 1.6*e = 27.2 cm  rec := 2 cm  d := e - rec = 150 mm
# 0.- Datos iniciales
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# Sobrecarga:
# Peso Propio
r.up(x) := (floor(x/cm) + 1) cm
SC_h := 200 kgf/m^2
PP_Tab := 100 kgf/m^2
r.upp(x) := r.up((x*10 - 10) cm)/(10 cm) + floor(x)
e_yeso := 25 cm
SC_AcE := 400 kgf/m^2
PP_y := e_yeso*(10 kgf/(m^2*cm)) = 250 kgf/m^2
SC_B := 300 kgf/m^2
e_SL := 5 cm
SC_A := 500 kgf/m^2
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PP_sl := e_SL*(20 kgf/(m^2*cm)) = 100 kgf/m^2
SC_T := 100 kgf/m^2
SC := SC_A
PP_adic := PP_Tab + PP_y + PP_sl
SC = 500 kgf/m^2
PP_adic = 450 kgf/m^2
# 1.- Tipo de Hormigón
#
# f'c := 350 MPa  γ_h := 2.5 tonnef/m^3  Hormigón H35
# fy := 420 MPa  Acero A63-42H
# LOSA 0101 | Caso: 6
# 2.- Dimensiones de Losa (Lx, Ly, e)
#
# Lx := 5 m  Ly := 5.33 m  e := 17 cm  ε := Ly/Lx = 1.066  ε := r.upp(ε) = 1.1
# 3.- Parámetros
#
# k := 0.55  λ := 35
# e_min := k*Lx/λ + rec = 9.85714 cm  e_min := r.up(e_min) = 10 cm
# mx := 50.7  my := 61.2  Δx := 1.05
# mex := 18.8  mey := 20.3  Δy := 1.05
# AS_min := e*0.18% = 3.06 cm^2/m
# Armadura mínima =>Φ8@16
# 4.- Cargas
#
# PP_losa := γ_h*e = 0.425 tonnef/m^2
# PP_t := PP_losa + PP_adic = 0.875 tonnef/m^2
# q_u := 1.2*PP_t + 1.6*SC  q_u = 1.85 tonnef/m^2
# Ku := q_u*(Lx*Ly) = 49.3025 tonnef*m/m
# α := SC/(2*q_u) = 0.135135
# 5.- Momento últimos
# Mx0101 := Ku/mx*(1 + α*Δx)*k  Mx0101 = 0.610729 tonnef*m/m  Momento positivo último en lado corto
# As := Mx0101/(0.9*(0.9*d)*fy) = 1.17366 cm^2/m  a := As*fy/(0.85*f'c*1 m) = 0.165694 mm/m  As := Mx0101/(0.9*(d - a*1 m/2)*fy)As = 1.05688 cm^2/m  <As_min  =>  Armadura mínima =>Φ8@16
# My0101 := Ku/my*(1 + α*Δy)*k  My0101 = 0.505947 tonnef*m/m  Momento positivo último en lado largo
# As := My0101/(0.9*(0.9*d)*fy) = 0.9723 cm^2/m  a := As*fy/(0.85*f'c*1 m) = 0.137266 mm/m  As := My0101/(0.9*(d - a*1 m/2)*fy)As = 0.875471 cm^2/m  <As_min  =>  Armadura mínima =>Φ8@16
# Mex0101 := Ku/mex*(1 + α*Δx)*k  Mex0101 = 1.64702 tonnef*m/m  Momento negativo último en lado corto
# As := Mex0101/(0.9*(0.9*d)*fy) = 3.16515 cm^2/m  a := As*fy/(0.85*f'c*1 m) = 0.446844 mm/m  As := Mex0101/(0.9*(d - a*1 m/2)*fy)As = 2.85288 cm^2/m  >As_min  =>  ϕ10@15
# Mey0101 := Ku/mey*(1 + α*Δy)*k  Mey0101 = 1.52532 tonnef*m/m  Momento negativo último en lado largo
# As := Mey0101/(0.9*(0.9*d)*fy) = 2.93127 cm^2/m  a := As*fy/(0.85*f'c*1 m) = 0.413826 mm/m  As := Mey0101/(0.9*(d - a*1 m/2)*fy)As = 2.64179 cm^2/m  >As_min  =>  ϕ10@16
# LOSA 0102  Caso: 6
#
# 2.- Dimensiones de Losa (Lx, Ly, e)
#
# Lx := 5 m  Ly := 7.2 m  e := 17 cm  ε := Ly/Lx = 1.44  ε := r.upp(ε) = 1.5
# 3.- Parámetros
#
# k := 0.58  λ := 35
# e_min := k*Lx/λ + rec = 10.2857 cm  e_min := r.up(e_min) = 11 cm
# mx := 44.4  my := 140.5  Δx := 1.31
# mex := 19.8  mey := 26.2  Δy := 1.31
# AS_min := e*0.18% = 3.06 cm^2/m
# Armadura mínima =>Φ8@16
# 4.- Cargas
#
# PP_losa := γ_h*e = 0.425 tonnef/m^2
# PP_t := PP_losa + PP_adic = 0.875 tonnef/m^2
# q_u := 1.2*PP_t + 1.6*SC  q_u = 1.85 tonnef/m^2
# Ku := q_u*(Lx*Ly) = 66.6 tonnef*m/m
# α := SC/(2*q_u) = 0.135135
# 5.- Momento últimos
# Mx0102 := Ku/mx*(1 + α*Δx)*k  Mx0102 = 1.02401 tonnef*m/m  Momento positivo último en lado corto
# As := Mx0102/(0.9*(0.9*d)*fy) = 1.96789 cm^2/m  a := As*fy/(0.85*f'c*1 m) = 0.27782 mm/m  As := Mx0102/(0.9*(d - a*1 m/2)*fy)As = 1.77274 cm^2/m  <As_min  =>  Armadura mínima =>Φ8@16
# My0102 := Ku/my*(1 + α*Δy)*k  My0102 = 0.323603 tonnef*m/m  Momento positivo último en lado largo
# As := My0102/(0.9*(0.9*d)*fy) = 0.621881 cm^2/m  a := As*fy/(0.85*f'c*1 m) = 0.087795 mm/m  As := My0102/(0.9*(d - a*1 m/2)*fy)As = 0.559857 cm^2/m  <As_min  =>  Armadura mínima =>Φ8@16
# Mex0102 := Ku/mex*(1 + α*Δx)*k  Mex0102 = 2.29627 tonnef*m/m  Momento negativo último en lado corto
# As := Mex0102/(0.9*(0.9*d)*fy) = 4.41284 cm^2/m  a := As*fy/(0.85*f'c*1 m) = 0.62299 mm/m  As := Mex0102/(0.9*(d - a*1 m/2)*fy)As = 3.97982 cm^2/m  >As_min  =>  ϕ10@11
# Mey0102 := Ku/mey*(1 + α*Δy)*k  Mey0102 = 1.73535 tonnef*m/m  Momento negativo último en lado largo
# As := Mey0102/(0.9*(0.9*d)*fy) = 3.3349 cm^2/m  a := As*fy/(0.85*f'c*1 m) = 0.470809 mm/m  As := Mey0102/(0.9*(d - a*1 m/2)*fy)
# As = 3.00613 cm^2/m  >As_min  =>  ϕ10@14
# LOSA 0103  Caso: 6
#
# 2.- Dimensiones de Losa (Lx, Ly, e)
#
# Lx := 5 m  Ly := 7.2 m  e := 17 cm  ε := Ly/Lx = 1.44  ε := r.upp(ε) = 1.5
# 3.- Parámetros
#
# k := 0.58  λ := 35
# e_min := k*Lx/λ + rec = 10.2857 cm  e_min := r.up(e_min) = 11 cm
# mx := 44.4  my := 140.5  Δx := 1.31
# mex := 19.8  mey := 26.2  Δy := 1.31
#
# AS_min := e*0.18% = 3.06 cm^2/m
# Armadura mínima =>Φ8@16
# 4.- Cargas
#
# PP_losa := γ_h*e = 0.425 tonnef/m^2
# PP_t := PP_losa + PP_adic = 0.875 tonnef/m^2
# q_u := 1.2*PP_t + 1.6*SC  q_u = 1.85 tonnef/m^2
# Ku := q_u*(Lx*Ly) = 66.6 tonnef*m/m
# α := SC/(2*q_u) = 0.135135
# 5.- Momento últimos
# Mx0103 := Ku/mx*(1 + α*Δx)*k  Mx0103 = 1.02401 tonnef*m/m  Momento positivo último en lado corto
# As := Mx0103/(0.9*(0.9*d)*fy) = 1.96789 cm^2/m  a := As*fy/(0.85*f'c*1 m) = 0.27782 mm/m  As := Mx0103/(0.9*(d - a*1 m/2)*fy)As = 1.77274 cm^2/m  <As_min  =>  Armadura mínima =>Φ8@16
# My0103 := Ku/my*(1 + α*Δy)*k  My0103 = 0.323603 tonnef*m/m  Momento positivo último en lado largo
# As := My0103/(0.9*(0.9*d)*fy) = 0.621881 cm^2/m  a := As*fy/(0.85*f'c*1 m) = 0.087795 mm/m  As := My0103/(0.9*(d - a*1 m/2)*fy)As = 0.559857 cm^2/m  <As_min  =>  Armadura mínima =>Φ8@16
# Mex0103 := Ku/mex*(1 + α*Δx)*k  Mex0103 = 2.29627 tonnef*m/m  Momento negativo último en lado corto
# As := Mex0103/(0.9*(0.9*d)*fy) = 4.41284 cm^2/m  a := As*fy/(0.85*f'c*1 m) = 0.62299 mm/m  As := Mex0103/(0.9*(d - a*1 m/2)*fy)As = 3.97982 cm^2/m  >As_min  =>  ϕ10@11
# Mey0103 := Ku/mey*(1 + α*Δy)*k  Mey0103 = 1.73535 tonnef*m/m  Momento negativo último en lado largo
# As := Mey0103/(0.9*(0.9*d)*fy) = 3.3349 cm^2/m  a := As*fy/(0.85*f'c*1 m) = 0.470809 mm/m  As := Mey0103/(0.9*(d - a*1 m/2)*fy)
# As = 3.00613 cm^2/m  >As_min  =>  ϕ10@15
# LOSA 0104  Caso: 6
#
# 2.- Dimensiones de Losa (Lx, Ly, e)
#
# Lx := 5 m  Ly := 7.89 m  e := 17 cm  ε := Ly/Lx = 1.578  ε := r.upp(ε) = 1.6
# 3.- Parámetros
#
# k := 1  λ := 35
# e_min := k*Lx/λ + rec = 16.2857 cm  e_min := r.up(e_min) = 17 cm
# mx := 46.1  my := 163  Δx := 1.39
# mex := 20.5  mey := 27.9  Δy := 1.39
#
# AS_min := e*0.18% = 3.06 cm^2/m
# Armadura mínima =>Φ8@16
# 4.- Cargas
#
# PP_losa := γ_h*e = 0.425 tonnef/m^2
# PP_t := PP_losa + PP_adic = 0.875 tonnef/m^2
# q_u := 1.2*PP_t + 1.6*SC  q_u = 1.85 tonnef/m^2
# Ku := q_u*(Lx*Ly) = 72.9825 tonnef*m/m  α := SC/(2*q_u) = 0.135135
# 5.- Momento últimos
# Mx0104 := Ku/mx*(1 + α*Δx)*k  Mx0104 = 1.88051 tonnef*m/m  Momento positivo último en lado corto
# As := Mx0104/(0.9*(0.9*d)*fy) = 3.61385 cm^2/m  a := As*fy/(0.85*f'c*1 m) = 0.510191 mm/m  As := Mx0104/(0.9*(d - a*1 m/2)*fy)As = 3.25801 cm^2/m  >As_min  =>  Φ8@15
# My0104 := Ku/my*(1 + α*Δy)*k  My0104 = 0.531849 tonnef*m/m  Momento positivo último en lado largo
# As := My0104/(0.9*(0.9*d)*fy) = 1.02208 cm^2/m  a := As*fy/(0.85*f'c*1 m) = 0.144293 mm/m  As := My0104/(0.9*(d - a*1 m/2)*fy)
# As = 0.920311 cm^2/m  <As_min  =>  Armadura mínima =>Φ8@16
# Mex0104 := Ku/mex*(1 + α*Δx)*k  Mex0104 = 4.22885 tonnef*m/m  Momento negativo último en lado corto
# As := Mex0104/(0.9*(0.9*d)*fy) = 8.12675 cm^2/m  a := As*fy/(0.85*f'c*1 m) = 1.14731 mm/m  As := Mex0104/(0.9*(d - a*1 m/2)*fy)As = 7.34216 cm^2/m  >As_min  =>  ϕ10@10
# Mey0104 := Ku/mey*(1 + α*Δy)*k  Mey0104 = 3.10722 tonnef*m/m  Momento negativo último en lado largo
# As := Mey0104/(0.9*(0.9*d)*fy) = 5.97127 cm^2/m  a := As*fy/(0.85*f'c*1 m) = 0.843003 mm/m  As := Mey0104/(0.9*(d - a*1 m/2)*fy)
# As = 5.38929 cm^2/m  >As_min  =>  ϕ10@14
# LOSA 0105  Caso: 6
#
# 2.- Dimensiones de Losa (Lx, Ly, e)
#
# Lx := 4.45 m  Ly := 5 m  e := 17 cm  ε := Ly/Lx = 1.1236  ε := r.upp(ε) = 1.2
# 3.- Parámetros
#
# k := 0.56  λ := 35
# e_min := k*Lx/λ + rec = 9.12 cm  e_min := r.up(e_min) = 10 cm
# mx := 47.2  my := 78.9  Δx := 1.1
# mex := 18.6  mey := 21.5  Δy := 1.1
#
# AS_min := e*0.18% = 3.06 cm^2/m
# Armadura mínima =>Φ8@16
# 4.- Cargas
#
# PP_losa := γ_h*e = 0.425 tonnef/m^2
# PP_t := PP_losa + PP_adic = 0.875 tonnef/m^2
# q_u := 1.2*PP_t + 1.6*SC  q_u = 1.85 tonnef/m^2
# Ku := q_u*(Lx*Ly) = 41.1625 tonnef*m/m  α := SC/(2*q_u) = 0.135135
# 5.- Momento últimos
# Mx0105 := Ku/mx*(1 + α*Δx)*k  Mx0105 = 0.560964 tonnef*m/m  Momento positivo último en lado corto
# As := Mx0105/(0.9*(0.9*d)*fy) = 1.07803 cm^2/m  a := As*fy/(0.85*f'c*1 m) = 0.152192 mm/m  As := Mx0105/(0.9*(d - a*1 m/2)*fy)As = 0.970718 cm^2/m  <As_min  =>  Armadura mínima =>Φ8@16
# My0105 := Ku/my*(1 + α*Δy)*k  My0105 = 0.335583 tonnef*m/m  Momento positivo último en lado largo
# As := My0105/(0.9*(0.9*d)*fy) = 0.644904 cm^2/m  a := As*fy/(0.85*f'c*1 m) = 0.0910453 mm/m  As := My0105/(0.9*(d - a*1 m/2)*fy)
# As = 0.58059 cm^2/m  <As_min  =>  Armadura mínima =>Φ8@16
# Mex0105 := Ku/mex*(1 + α*Δx)*k  Mex0105 = 1.42352 tonnef*m/m  Momento negativo último en lado corto
# As := Mex0105/(0.9*(0.9*d)*fy) = 2.73564 cm^2/m  a := As*fy/(0.85*f'c*1 m) = 0.386208 mm/m  As := Mex0105/(0.9*(d - a*1 m/2)*fy)As = 2.46525 cm^2/m  >As_min  =>  ϕ8@11
# Mey0105 := Ku/mey*(1 + α*Δy)*k  Mey0105 = 1.23151 tonnef*m/m  Momento negativo último en lado largo
# As := Mey0105/(0.9*(0.9*d)*fy) = 2.36665 cm^2/m  a := As*fy/(0.85*f'c*1 m) = 0.334115 mm/m  As := Mey0105/(0.9*(d - a*1 m/2)*fy)
# As = 2.13236 cm^2/m  >As_min  =>  ϕ8@13
# LOSA 0106  Caso: 6
#
# 2.- Dimensiones de Losa (Lx, Ly, e)
#
# Lx := 3.6 m  Ly := 5 m  e := 17 cm  ε := Ly/Lx = 1.38889  ε := r.upp(ε) = 1.4
# 3.- Parámetros
#
# k := 0.57  λ := 35
# e_min := k*Lx/λ + rec = 7.86286 cm  e_min := r.up(e_min) = 8 cm
# mx := 44.6  my := 116.6  Δx := 1.24
# mex := 19.2  mey := 24.5  Δy := 1.24
#
# AS_min := e*0.18% = 3.06 cm^2/m
# Armadura mínima =>Φ8@16
# 4.- Cargas
#
# PP_losa := γ_h*e = 0.425 tonnef/m^2
# PP_t := PP_losa + PP_adic = 0.875 tonnef/m^2
# q_u := 1.2*PP_t + 1.6*SC  q_u = 1.85 tonnef/m^2
# Ku := q_u*(Lx*Ly) = 33.3 tonnef*m/m  α := SC/(2*q_u) = 0.135135
# 5.- Momento últimos
# Mx0106 := Ku/mx*(1 + α*Δx)*k  Mx0106 = 0.496897 tonnef*m/m  Momento positivo último en lado corto
# As := Mx0106/(0.9*(0.9*d)*fy) = 0.954908 cm^2/m  a := As*fy/(0.85*f'c*1 m) = 0.13481 mm/m  As := Mx0106/(0.9*(d - a*1 m/2)*fy)As = 0.859803 cm^2/m  <As_min  =>  Armadura mínima =>Φ8@16
# My0106 := Ku/my*(1 + α*Δy)*k  My0106 = 0.190065 tonnef*m/m  Momento positivo último en lado largo
# As := My0106/(0.9*(0.9*d)*fy) = 0.365256 cm^2/m  a := As*fy/(0.85*f'c*1 m) = 0.0515656 mm/m  As := My0106/(0.9*(d - a*1 m/2)*fy)
# As = 0.328787 cm^2/m  <As_min  =>  Armadura mínima =>Φ8@16
# Mex0106 := Ku/mex*(1 + α*Δx)*k  Mex0106 = 1.15425 tonnef*m/m  Momento negativo último en lado corto
# As := Mex0106/(0.9*(0.9*d)*fy) = 2.21817 cm^2/m  a := As*fy/(0.85*f'c*1 m) = 0.313154 mm/m  As := Mex0106/(0.9*(d - a*1 m/2)*fy)As = 1.99844 cm^2/m  >As_min  =>  ϕ8@14
# Mey0106 := Ku/mey*(1 + α*Δy)*k  Mey0106 = 0.904555 tonnef*m/m  Momento negativo último en lado largo
# As := Mey0106/(0.9*(0.9*d)*fy) = 1.73832 cm^2/m  a := As*fy/(0.85*f'c*1 m) = 0.24541 mm/m  As := Mey0106/(0.9*(d - a*1 m/2)*fy)
# As = 1.56577 cm^2/m  >As_min  =>  ϕ8@18
# LOSA 0107  Caso: 6
#
# 2.- Dimensiones de Losa (Lx, Ly, e)
#
# Lx := 5.33 m  Ly := 5.54 m  e := 17 cm  ε := Ly/Lx = 1.0394  ε := r.upp(ε) = 1.1
# 3.- Parámetros
#
# k := 0.55  λ := 35
# e_min := k*Lx/λ + rec = 10.3757 cm  e_min := r.up(e_min) = 11 cm
# mx := 50.7  my := 66.3  Δx := 1.05
# mex := 18.8  mey := 20.3  Δy := 1.05
#
# AS_min := e*0.18% = 3.06 cm^2/m
# Armadura mínima =>Φ8@16
# 4.- Cargas
#
# PP_losa := γ_h*e = 0.425 tonnef/m^2
# PP_t := PP_losa + PP_adic = 0.875 tonnef/m^2
# q_u := 1.2*PP_t + 1.6*SC  q_u = 1.85 tonnef/m^2
# Ku := q_u*(Lx*Ly) = 54.6272 tonnef*m/m  α := SC/(2*q_u) = 0.135135
# 5.- Momento últimos
# Mx0107 := Ku/mx*(1 + α*Δx)*k  Mx0107 = 0.676688 tonnef*m/m  Momento positivo último en lado corto
# As := Mx0107/(0.9*(0.9*d)*fy) = 1.30042 cm^2/m  a := As*fy/(0.85*f'c*1 m) = 0.183589 mm/m  As := Mx0107/(0.9*(d - a*1 m/2)*fy)As = 1.17109 cm^2/m  <As_min  =>  Armadura mínima =>Φ8@16
# My0107 := Ku/my*(1 + α*Δy)*k  My0107 = 0.517467 tonnef*m/m  Momento positivo último en lado largo
# As := My0107/(0.9*(0.9*d)*fy) = 0.994439 cm^2/m  a := As*fy/(0.85*f'c*1 m) = 0.140391 mm/m  As := My0107/(0.9*(d - a*1 m/2)*fy)
# As = 0.895414 cm^2/m  <As_min  =>  Armadura mínima =>Φ8@16
# Mex0107 := Ku/mex*(1 + α*Δx)*k  Mex0107 = 1.8249 tonnef*m/m  Momento negativo último en lado corto
# As := Mex0107/(0.9*(0.9*d)*fy) = 3.50698 cm^2/m  a := As*fy/(0.85*f'c*1 m) = 0.495103 mm/m  As := Mex0107/(0.9*(d - a*1 m/2)*fy)As = 3.1615 cm^2/m  >As_min  =>  ϕ10@13
# Mey0107 := Ku/mey*(1 + α*Δy)*k  Mey0107 = 1.69005 tonnef*m/m  Momento negativo último en lado largo
# As := Mey0107/(0.9*(0.9*d)*fy) = 3.24785 cm^2/m  a := As*fy/(0.85*f'c*1 m) = 0.458519 mm/m  As := Mey0107/(0.9*(d - a*1 m/2)*fy)
# As = 2.92754 cm^2/m  >As_min  =>  ϕ10@14
# LOSA 0108  Caso: 6
#
# 2.- Dimensiones de Losa (Lx, Ly, e)
#
# Lx := 5.54 m  Ly := 7.2 m  e := 17 cm  ε := Ly/Lx = 1.29964  ε := r.upp(ε) = 1.3
# 3.- Parámetros
#
# k := 0.56  λ := 35
# e_min := k*Lx/λ + rec = 10.864 cm  e_min := r.up(e_min) = 11 cm
# mx := 45.2  my := 95.6  Δx := 1.17
# mex := 18.8  mey := 22.9  Δy := 1.17
#
# AS_min := e*0.18% = 3.06 cm^2/m
# Armadura mínima =>Φ8@16
# 4.- Cargas
#
# PP_losa := γ_h*e = 0.425 tonnef/m^2
# PP_t := PP_losa + PP_adic = 0.875 tonnef/m^2
# q_u := 1.2*PP_t + 1.6*SC  q_u = 1.85 tonnef/m^2
# Ku := q_u*(Lx*Ly) = 73.7928 tonnef*m/m  α := SC/(2*q_u) = 0.135135
# 5.- Momento últimos
# Mx0108 := Ku/mx*(1 + α*Δx)*k  Mx0108 = 1.0588 tonnef*m/m  Momento positivo último en lado corto
# As := Mx0108/(0.9*(0.9*d)*fy) = 2.03473 cm^2/m  a := As*fy/(0.85*f'c*1 m) = 0.287257 mm/m  As := Mx0108/(0.9*(d - a*1 m/2)*fy)As = 1.83302 cm^2/m  <As_min  =>  Armadura mínima =>Φ8@16
# My0108 := Ku/my*(1 + α*Δy)*k  My0108 = 0.500603 tonnef*m/m  Momento positivo último en lado largo
# As := My0108/(0.9*(0.9*d)*fy) = 0.962029 cm^2/m  a := As*fy/(0.85*f'c*1 m) = 0.135816 mm/m  As := My0108/(0.9*(d - a*1 m/2)*fy)
# As = 0.866219 cm^2/m  <As_min  =>  Armadura mínima =>Φ8@16
# Mex0108 := Ku/mex*(1 + α*Δx)*k  Mex0108 = 2.54562 tonnef*m/m  Momento negativo último en lado corto
# As := Mex0108/(0.9*(0.9*d)*fy) = 4.89202 cm^2/m  a := As*fy/(0.85*f'c*1 m) = 0.690638 mm/m  As := Mex0108/(0.9*(d - a*1 m/2)*fy)As = 4.41298 cm^2/m  >As_min  =>  ϕ10@11
# Mey0108 := Ku/mey*(1 + α*Δy)*k  Mey0108 = 2.08985 tonnef*m/m  Momento negativo último en lado largo
# As := Mey0108/(0.9*(0.9*d)*fy) = 4.01616 cm^2/m  a := As*fy/(0.85*f'c*1 m) = 0.566987 mm/m  As := Mey0108/(0.9*(d - a*1 m/2)*fy)
# As = 3.62139 cm^2/m  >As_min  =>  ϕ8@13
# LOSA 0109  Caso: 6
#
# 2.- Dimensiones de Losa (Lx, Ly, e)
#
# Lx := 5.54 m  Ly := 7.2 m  e := 17 cm  ε := Ly/Lx = 1.29964  ε := r.upp(ε) = 1.3
# 3.- Parámetros
#
# k := 0.56  λ := 35
# e_min := k*Lx/λ + rec = 10.864 cm  e_min := r.up(e_min) = 11 cm
# mx := 45.2  my := 95.6  Δx := 1.17
# mex := 18.8  mey := 22.9  Δy := 1.17
#
# AS_min := e*0.18% = 3.06 cm^2/m
# Armadura mínima =>Φ8@16
# 4.- Cargas
#
# PP_losa := γ_h*e = 0.425 tonnef/m^2
# PP_t := PP_losa + PP_adic = 0.875 tonnef/m^2
# q_u := 1.2*PP_t + 1.6*SC  q_u = 1.85 tonnef/m^2
# Ku := q_u*(Lx*Ly) = 73.7928 tonnef*m/m  α := SC/(2*q_u) = 0.135135
# 5.- Momento últimos
# Mx0109 := Ku/mx*(1 + α*Δx)*k  Mx0109 = 1.0588 tonnef*m/m  Momento positivo último en lado corto
# As := Mx0109/(0.9*(0.9*d)*fy) = 2.03473 cm^2/m  a := As*fy/(0.85*f'c*1 m) = 0.287257 mm/m  As := Mx0109/(0.9*(d - a*1 m/2)*fy)As = 1.83302 cm^2/m  <As_min  =>  Armadura mínima =>Φ8@16
# My0109 := Ku/my*(1 + α*Δy)*k  My0109 = 0.500603 tonnef*m/m  Momento positivo último en lado largo
# As := My0109/(0.9*(0.9*d)*fy) = 0.962029 cm^2/m  a := As*fy/(0.85*f'c*1 m) = 0.135816 mm/m  As := My0109/(0.9*(d - a*1 m/2)*fy)
# As = 0.866219 cm^2/m  <As_min  =>  Armadura mínima =>Φ8@16
# Mex0109 := Ku/mex*(1 + α*Δx)*k  Mex0109 = 2.54562 tonnef*m/m  Momento negativo último en lado corto
# As := Mex0109/(0.9*(0.9*d)*fy) = 4.89202 cm^2/m  a := As*fy/(0.85*f'c*1 m) = 0.690638 mm/m  As := Mex0109/(0.9*(d - a*1 m/2)*fy)As = 4.41298 cm^2/m  >As_min  =>  ϕ10@11
# Mey0109 := Ku/mey*(1 + α*Δy)*k  Mey0109 = 2.08985 tonnef*m/m  Momento negativo último en lado largo
# As := Mey0109/(0.9*(0.9*d)*fy) = 4.01616 cm^2/m  a := As*fy/(0.85*f'c*1 m) = 0.566987 mm/m  As := Mey0109/(0.9*(d - a*1 m/2)*fy)
# As = 3.62139 cm^2/m  >As_min  =>  ϕ8@13
# LOSA 0110  Caso: 6
#
# 2.- Dimensiones de Losa (Lx, Ly,e)
#
# Lx := 5.54 m  Ly := 12.34 m  e := 17 cm  ε := Ly/Lx = 2.22744  ε := r.upp(ε) = 3.3
# 3.- Parámetros
#
# k := 0.58  λ := 35
# e_min := k*Lx/λ + rec = 11.1806 cm  e_min := r.up(e_min) = 12 cm
# mx := q_u*Ly^2/(17*tonnef) = 16.5712  my := 0  Δx := 0
# mex := q_u*Ly^2/(12*tonnef) = 23.4758  mey := q_u*Ly^2/(17.5*tonnef) = 16.0977  Δy := 0
# AS_min := e*0.18% = 3.06 cm^2/m
# Armadura mínima =>Φ8@16
# 4.- Cargas
#
# PP_losa := γ_h*e = 0.425 tonnef/m^2
# PP_t := PP_losa + PP_adic = 0.875 tonnef/m^2
# q_u := 1.2*PP_t + 1.6*SC  q_u = 1.85 tonnef/m^2
# Ku := q_u*(Lx*Ly) = 126.473 tonnef*m/m  α := SC/(2*q_u) = 0.135135
# 5.- Momento últimos
# Mx0110 := Ku/mx*(1 + α*Δx)*k  Mx0110 = 4.42661 tonnef*m/m  Momento positivo último en lado corto
# As := Mx0110/(0.9*(0.9*d)*fy) = 8.50681 cm^2/m  a := As*fy/(0.85*f'c*1 m) = 1.20096 mm/m  As := Mx0110/(0.9*(d - a*1 m/2)*fy)As = 7.6869 cm^2/m  >As_min  =>  Φ10@10
# My0110 := Ku/my*(1 + α*Δy)*k  My0110 =  Momento positivo último en lado largo
# As := My0110/(0.9*(0.9*d)*fy)  a := As*fy/(0.85*f'c*1 m)  As := My0110/(0.9*(d - a*1 m/2)*fy)
# As =  <As_min  =>  Armadura mínima =>Φ8@16
# Mex0110 := Ku/mex*(1 + α*Δx)*k  Mex0110 = 3.12467 tonnef*m/m  Momento negativo último en lado corto
# As := Mex0110/(0.9*(0.9*d)*fy) = 6.00481 cm^2/m  a := As*fy/(0.85*f'c*1 m) = 0.847737 mm/m  As := Mex0110/(0.9*(d - a*1 m/2)*fy)
# As = 5.41964 cm^2/m  >As_min  =>  ϕ10@15
# Mey0110 := Ku/mey*(1 + α*Δy)*k  Mey0110 = 4.55681 tonnef*m/m  Momento negativo último en lado largo
# As := Mey0110/(0.9*(0.9*d)*fy) = 8.75701 cm^2/m  a := As*fy/(0.85*f'c*1 m) = 1.23628 mm/m  As := Mey0110/(0.9*(d - a*1 m/2)*fy)
# As = 7.91392 cm^2/m  >As_min  =>  ϕ10@10
# LOSA 0111  Caso: 6
#
# 2.- Dimensiones de Losa (Lx, Ly,e)
#
# Lx := 3.6 m  Ly := 5.54 m  e := 17 cm  ε := Ly/Lx = 1.53889  ε := r.upp(ε) = 1.6
# 3.- Parámetros
#
# k := 0.58  λ := 35
# e_min := k*Lx/λ + rec = 7.96571 cm  e_min := r.up(e_min) = 8 cm
# mx := 46.1  my := 163  Δx := 1.39
# mex := 20.5  mey := 27.9  Δy := 1.39
# AS_min := e*0.18% = 3.06 cm^2/m
# Armadura mínima =>Φ8@16
# 4.- Cargas
#
# PP_losa := γ_h*e = 0.425 tonnef/m^2
# PP_t := PP_losa + PP_adic = 0.875 tonnef/m^2
# q_u := 1.2*PP_t + 1.6*SC  q_u = 1.85 tonnef/m^2
# Ku := q_u*(Lx*Ly) = 36.8964 tonnef*m/m  α := SC/(2*q_u) = 0.135135
# 5.- Momento últimos
# Mx0111 := Ku/mx*(1 + α*Δx)*k  Mx0111 = 0.551402 tonnef*m/m  Momento positivo último en lado corto
# As := Mx0111/(0.9*(0.9*d)*fy) = 1.05965 cm^2/m  a := As*fy/(0.85*f'c*1 m) = 0.149598 mm/m  As := Mx0111/(0.9*(d - a*1 m/2)*fy)As = 0.954163 cm^2/m  <As_min  =>  Armadura mínima =>Φ8@16
# My0111 := Ku/my*(1 + α*Δy)*k  My0111 = 0.155949 tonnef*m/m  Momento positivo último en lado largo
# As := My0111/(0.9*(0.9*d)*fy) = 0.299693 cm^2/m  a := As*fy/(0.85*f'c*1 m) = 0.0423096 mm/m  As := My0111/(0.9*(d - a*1 m/2)*fy)
# As = 0.269762 cm^2/m  <As_min  =>  Armadura mínima =>Φ8@16
# Mex0111 := Ku/mex*(1 + α*Δx)*k  Mex0111 = 1.23998 tonnef*m/m  Momento negativo último en lado corto
# As := Mex0111/(0.9*(0.9*d)*fy) = 2.38293 cm^2/m  a := As*fy/(0.85*f'c*1 m) = 0.336413 mm/m  As := Mex0111/(0.9*(d - a*1 m/2)*fy)
# As = 2.14704 cm^2/m  <As_min  =>  Armadura mínima =>Φ8@16
# Mey0111 := Ku/mey*(1 + α*Δy)*k  Mey0111 = 0.911098 tonnef*m/m  Momento negativo último en lado largo
# As := Mey0111/(0.9*(0.9*d)*fy) = 1.75089 cm^2/m  a := As*fy/(0.85*f'c*1 m) = 0.247185 mm/m  As := Mey0111/(0.9*(d - a*1 m/2)*fy)
# As = 1.5771 cm^2/m  <As_min  =>  Armadura mínima =>Φ8@16
# LOSA 0112  Caso: 6
#
# 2.- Dimensiones de Losa (Lx, Ly,e)
#
# Lx := 6.05 m  Ly := 9.34 m  e := 17 cm  ε := Ly/Lx = 1.5438  ε := r.upp(ε) = 1.6
# 3.- Parámetros
#
# k := 0.58  λ := 35
# e_min := k*Lx/λ + rec = 12.0257 cm  e_min := r.up(e_min) = 13 cm
# mx := 46.1  my := 163  Δx := 1.39
# mex := 20.5  mey := 27.9  Δy := 1.39
# AS_min := e*0.18% = 3.06 cm^2/m
# Armadura mínima =>Φ8@16
# 4.- Cargas
#
# PP_losa := γ_h*e = 0.425 tonnef/m^2
# PP_t := PP_losa + PP_adic = 0.875 tonnef/m^2
# q_u := 1.2*PP_t + 1.6*SC  q_u = 1.85 tonnef/m^2
# Ku := q_u*(Lx*Ly) = 104.538 tonnef*m/m  α := SC/(2*q_u) = 0.135135
# 5.- Momento últimos
# Mx0112 := Ku/mx*(1 + α*Δx)*k  Mx0112 = 1.56228 tonnef*m/m  Momento positivo último en lado corto
# As := Mx0112/(0.9*(0.9*d)*fy) = 3.00229 cm^2/m  a := As*fy/(0.85*f'c*1 m) = 0.423853 mm/m  As := Mx0112/(0.9*(d - a*1 m/2)*fy)
# As = 2.70589 cm^2/m  <As_min  =>  Armadura mínima =>Φ8@16
# My0112 := Ku/my*(1 + α*Δy)*k  My0112 = 0.441847 tonnef*m/m  Momento positivo último en lado largo
# As := My0112/(0.9*(0.9*d)*fy) = 0.849115 cm^2/m  a := As*fy/(0.85*f'c*1 m) = 0.119875 mm/m  As := My0112/(0.9*(d - a*1 m/2)*fy)
# As = 0.764509 cm^2/m  <As_min  =>  Armadura mínima =>Φ8@16
# Mex0112 := Ku/mex*(1 + α*Δx)*k  Mex0112 = 3.51322 tonnef*m/m  Momento negativo último en lado corto
# As := Mex0112/(0.9*(0.9*d)*fy) = 6.7515 cm^2/m  a := As*fy/(0.85*f'c*1 m) = 0.953153 mm/m  As := Mex0112/(0.9*(d - a*1 m/2)*fy)
# As = 6.09572 cm^2/m  >As_min  =>  Φ10@13
# Mey0112 := Ku/mey*(1 + α*Δy)*k  Mey0112 = 2.5814 tonnef*m/m  Momento negativo último en lado largo
# As := Mey0112/(0.9*(0.9*d)*fy) = 4.96078 cm^2/m  a := As*fy/(0.85*f'c*1 m) = 0.700346 mm/m  As := Mey0112/(0.9*(d - a*1 m/2)*fy)
# As = 4.47515 cm^2/m  >As_min  =>  Φ8@10
# LOSA 0113  Caso: 6
#
# 2.- Dimensiones de Losa (Lx, Ly,e)
#
# Lx := 4.65 m  Ly := 5.6 m  e := 17 cm  ε := Ly/Lx = 1.2043  ε := r.upp(ε) = 1.3
# 3.- Parámetros
#
# k := 0.56  λ := 35
# e_min := k*Lx/λ + rec = 9.44 cm  e_min := r.up(e_min) = 10 cm
# mx := 45.2  my := 95.6  Δx := 1.17
# mex := 18.8  mey := 22.9  Δy := 1.17
# AS_min := e*0.18% = 3.06 cm^2/m
# Armadura mínima =>Φ8@16
# 4.- Cargas
#
# PP_losa := γ_h*e = 0.425 tonnef/m^2
# PP_t := PP_losa + PP_adic = 0.875 tonnef/m^2
# q_u := 1.2*PP_t + 1.6*SC  q_u = 1.85 tonnef/m^2
# Ku := q_u*(Lx*Ly) = 48.174 tonnef*m/m  α := SC/(2*q_u) = 0.135135
# 5.- Momento últimos
# Mx0113 := Ku/mx*(1 + α*Δx)*k  Mx0113 = 0.691212 tonnef*m/m  Momento positivo último en lado corto
# As := Mx0113/(0.9*(0.9*d)*fy) = 1.32833 cm^2/m  a := As*fy/(0.85*f'c*1 m) = 0.187529 mm/m  As := Mx0113/(0.9*(d - a*1 m/2)*fy)
# As = 1.19625 cm^2/m  <As_min  =>  Armadura mínima =>Φ8@16
# My0113 := Ku/my*(1 + α*Δy)*k  My0113 = 0.326807 tonnef*m/m  Momento positivo último en lado largo
# As := My0113/(0.9*(0.9*d)*fy) = 0.62804 cm^2/m  a := As*fy/(0.85*f'c*1 m) = 0.0886644 mm/m  As := My0113/(0.9*(d - a*1 m/2)*fy)
# As = 0.565403 cm^2/m  <As_min  =>  Armadura mínima =>Φ8@16
# Mex0113 := Ku/mex*(1 + α*Δx)*k  Mex0113 = 1.66185 tonnef*m/m  Momento negativo último en lado corto
# As := Mex0113/(0.9*(0.9*d)*fy) = 3.19365 cm^2/m  a := As*fy/(0.85*f'c*1 m) = 0.450868 mm/m  As := Mex0113/(0.9*(d - a*1 m/2)*fy)
# As = 2.87861 cm^2/m  <As_min  =>  Armadura mínima =>Φ8@16
# Mey0113 := Ku/mey*(1 + α*Δy)*k  Mey0113 = 1.36431 tonnef*m/m  Momento negativo último en lado largo
# As := Mey0113/(0.9*(0.9*d)*fy) = 2.62186 cm^2/m  a := As*fy/(0.85*f'c*1 m) = 0.370145 mm/m  As := Mey0113/(0.9*(d - a*1 m/2)*fy)
# As = 2.36259 cm^2/m  <As_min  =>  Armadura mínima =>Φ8@16
# LOSA 0114  Caso: 6
#
# 2.- Dimensiones de Losa (Lx, Ly,e)
#
# Lx := 4.65 m  Ly := 5.6 m  e := 17 cm  ε := Ly/Lx = 1.2043  ε := r.upp(ε) = 1.3
# 3.- Parámetros
#
# k := 0.56  λ := 35
# e_min := k*Lx/λ + rec = 9.44 cm  e_min := r.up(e_min) = 10 cm
# mx := 45.2  my := 95.6  Δx := 1.17
# mex := 18.8  mey := 22.9  Δy := 1.17
# AS_min := e*0.18% = 3.06 cm^2/m
# Armadura mínima =>Φ8@16
# 4.- Cargas
#
# PP_losa := γ_h*e = 0.425 tonnef/m^2
# PP_t := PP_losa + PP_adic = 0.875 tonnef/m^2
# q_u := 1.2*PP_t + 1.6*SC  q_u = 1.85 tonnef/m^2
# Ku := q_u*(Lx*Ly) = 48.174 tonnef*m/m  α := SC/(2*q_u) = 0.135135
# 5.- Momento últimos
# Mx0114 := Ku/mx*(1 + α*Δx)*k  Mx0114 = 0.691212 tonnef*m/m  Momento positivo último en lado corto
# As := Mx0114/(0.9*(0.9*d)*fy) = 1.32833 cm^2/m  a := As*fy/(0.85*f'c*1 m) = 0.187529 mm/m  As := Mx0114/(0.9*(d - a*1 m/2)*fy)
# As = 1.19625 cm^2/m  <As_min  =>  Armadura mínima =>Φ8@16
# My0114 := Ku/my*(1 + α*Δy)*k  My0114 = 0.326807 tonnef*m/m  Momento positivo último en lado largo
# As := My0114/(0.9*(0.9*d)*fy) = 0.62804 cm^2/m  a := As*fy/(0.85*f'c*1 m) = 0.0886644 mm/m  As := My0114/(0.9*(d - a*1 m/2)*fy)
# As = 0.565403 cm^2/m  <As_min  =>  Armadura mínima =>Φ8@16
# Mex0114 := Ku/mex*(1 + α*Δx)*k  Mex0114 = 1.66185 tonnef*m/m  Momento negativo último en lado corto
# As := Mex0114/(0.9*(0.9*d)*fy) = 3.19365 cm^2/m  a := As*fy/(0.85*f'c*1 m) = 0.450868 mm/m  As := Mex0114/(0.9*(d - a*1 m/2)*fy)
# As = 2.87861 cm^2/m  <As_min  =>  Armadura mínima =>Φ8@16
# Mey0114 := Ku/mey*(1 + α*Δy)*k  Mey0114 = 1.36431 tonnef*m/m  Momento negativo último en lado largo
# As := Mey0114/(0.9*(0.9*d)*fy) = 2.62186 cm^2/m  a := As*fy/(0.85*f'c*1 m) = 0.370145 mm/m  As := Mey0114/(0.9*(d - a*1 m/2)*fy)
# As = 2.36259 cm^2/m  <As_min  =>  Armadura mínima =>Φ8@16
# LOSA 0115  Caso: 6
#
# 2.- Dimensiones de Losa (Lx, Ly,e)
#
# Lx := 6.05 m  Ly := 9.49 m  e := 17 cm  ε := Ly/Lx = 1.5686  ε := r.upp(ε) = 1.6
# 3.- Parámetros
#
# k := 0.58  λ := 35
# e_min := k*Lx/λ + rec = 12.0257 cm  e_min := r.up(e_min) = 13 cm
# mx := 46.1  my := 163  Δx := 1.39
# mex := 20.5  mey := 27.9  Δy := 1.39
# AS_min := e*0.18% = 3.06 cm^2/m
# Armadura mínima =>Φ8@16
# 4.- Cargas
#
# PP_losa := γ_h*e = 0.425 tonnef/m^2
# PP_t := PP_losa + PP_adic = 0.875 tonnef/m^2
# q_u := 1.2*PP_t + 1.6*SC  q_u = 1.85 tonnef/m^2
# Ku := q_u*(Lx*Ly) = 106.217 tonnef*m/m  α := SC/(2*q_u) = 0.135135
# 5.- Momento últimos
# Mx0115 := Ku/mx*(1 + α*Δx)*k  Mx0115 = 1.58737 tonnef*m/m  Momento positivo último en lado corto
# As := Mx0115/(0.9*(0.9*d)*fy) = 3.05051 cm^2/m  a := As*fy/(0.85*f'c*1 m) = 0.43066 mm/m  As := Mx0115/(0.9*(d - a*1 m/2)*fy)
# As = 2.74941 cm^2/m  <As_min  =>  Armadura mínima =>Φ8@16
# My0115 := Ku/my*(1 + α*Δy)*k  My0115 = 0.448943 tonnef*m/m  Momento positivo último en lado largo
# As := My0115/(0.9*(0.9*d)*fy) = 0.862752 cm^2/m  a := As*fy/(0.85*f'c*1 m) = 0.1218 mm/m  As := My0115/(0.9*(d - a*1 m/2)*fy)
# As = 0.776792 cm^2/m  <As_min  =>  Armadura mínima =>Φ8@16
# Mex0115 := Ku/mex*(1 + α*Δx)*k  Mex0115 = 3.56964 tonnef*m/m  Momento negativo último en lado corto
# As := Mex0115/(0.9*(0.9*d)*fy) = 6.85993 cm^2/m  a := As*fy/(0.85*f'c*1 m) = 0.968461 mm/m  As := Mex0115/(0.9*(d - a*1 m/2)*fy)
# As = 6.19393 cm^2/m  >As_min  =>  Φ10@12
# Mey0115 := Ku/mey*(1 + α*Δy)*k  Mey0115 = 2.62285 tonnef*m/m  Momento negativo último en lado largo
# As := Mey0115/(0.9*(0.9*d)*fy) = 5.04045 cm^2/m  a := As*fy/(0.85*f'c*1 m) = 0.711593 mm/m  As := Mey0115/(0.9*(d - a*1 m/2)*fy)
# As = 4.54719 cm^2/m  >As_min  =>  Φ8@11
# LOSA 0116  Caso: 6
#
# 2.- Dimensiones de Losa (Lx, Ly,e)
#
# Lx := 4.45 m  Ly := 10.5 m  e := 17 cm  ε := Ly/Lx = 2.35955  ε := r.upp(ε) = 3.4
# 3.- Parámetros
#
# k := 0.58  λ := 35
# e_min := k*Lx/λ + rec = 9.37429 cm  e_min := r.up(e_min) = 10 cm
# mx := q_u*Ly^2/(17*tonnef) = 11.9978  my := 0  Δx := 0
# mex := q_u*Ly^2/(12*tonnef) = 16.9969  mey := q_u*Ly^2/(17.5*tonnef) = 11.655  Δy := 0
# AS_min := e*0.18% = 3.06 cm^2/m
# Armadura mínima =>Φ8@16
# 4.- Cargas
#
# PP_losa := γ_h*e = 0.425 tonnef/m^2
# PP_t := PP_losa + PP_adic = 0.875 tonnef/m^2
# q_u := 1.2*PP_t + 1.6*SC  q_u = 1.85 tonnef/m^2
# Ku := q_u*(Lx*Ly) = 86.4412 tonnef*m/m  α := SC/(2*q_u) = 0.135135
# 5.- Momento últimos
# Mx0116 := Ku/mx*(1 + α*Δx)*k  Mx0116 = 4.17876 tonnef*m/m  Momento positivo último en lado corto
# As := Mx0116/(0.9*(0.9*d)*fy) = 8.0305 cm^2/m  a := As*fy/(0.85*f'c*1 m) = 1.13372 mm/m  As := Mx0116/(0.9*(d - a*1 m/2)*fy)
# As = 7.25487 cm^2/m  >As_min  =>  Φ10@10
# My0116 := Ku/my*(1 + α*Δy)*k  My0116 =  Momento positivo último en lado largo
# As := My0116/(0.9*(0.9*d)*fy)  a := As*fy/(0.85*f'c*1 m)  As := My0116/(0.9*(d - a*1 m/2)*fy)
# As =  <As_min  =>  Armadura mínima =>Φ8@16
# Mex0116 := Ku/mex*(1 + α*Δx)*k  Mex0116 = 2.94971 tonnef*m/m  Momento negativo último en lado corto
# As := Mex0116/(0.9*(0.9*d)*fy) = 5.66859 cm^2/m  a := As*fy/(0.85*f'c*1 m) = 0.800272 mm/m  As := Mex0116/(0.9*(d - a*1 m/2)*fy)
# As = 5.11538 cm^2/m  >As_min  =>  Φ10@15
# Mey0116 := Ku/mey*(1 + α*Δy)*k  Mey0116 = 4.30167 tonnef*m/m  Momento negativo último en lado largo
# As := Mey0116/(0.9*(0.9*d)*fy) = 8.26669 cm^2/m  a := As*fy/(0.85*f'c*1 m) = 1.16706 mm/m  As := Mey0116/(0.9*(d - a*1 m/2)*fy)
# As = 7.46908 cm^2/m  >As_min  =>  Φ10@10
# LOSA 0117  Caso: 6
#
# 2.- Dimensiones de Losa (Lx, Ly,e)
#
# Lx := 3.06 m  Ly := 10.5 m  e := 17 cm  ε := Ly/Lx = 3.43137  ε := r.upp(ε) = 5.5
# 3.- Parámetros
#
# k := 0.58  λ := 35
# e_min := k*Lx/λ + rec = 7.07086 cm  e_min := r.up(e_min) = 8 cm
# mx := q_u*Ly^2/(17*tonnef) = 11.9978  my := 0  Δx := 0
# mex := q_u*Ly^2/(12*tonnef) = 16.9969  mey := q_u*Ly^2/(17.5*tonnef) = 11.655  Δy := 0
# AS_min := e*0.18% = 3.06 cm^2/m
# Armadura mínima =>Φ8@16
# 4.- Cargas
#
# PP_losa := γ_h*e = 0.425 tonnef/m^2
# PP_t := PP_losa + PP_adic = 0.875 tonnef/m^2
# q_u := 1.2*PP_t + 1.6*SC  q_u = 1.85 tonnef/m^2
# Ku := q_u*(Lx*Ly) = 59.4405 tonnef*m/m  α := SC/(2*q_u) = 0.135135
# 5.- Momento últimos
# Mx0117 := Ku/mx*(1 + α*Δx)*k  Mx0117 = 2.87349 tonnef*m/m  Momento positivo último en lado corto
# As := Mx0117/(0.9*(0.9*d)*fy) = 5.5221 cm^2/m  a := As*fy/(0.85*f'c*1 m) = 0.77959 mm/m  As := Mx0117/(0.9*(d - a*1 m/2)*fy)
# As = 4.98284 cm^2/m  >As_min  =>  Φ8@10
# My0117 := Ku/my*(1 + α*Δy)*k  My0117 =  Momento positivo último en lado largo
# As := My0117/(0.9*(0.9*d)*fy)  a := As*fy/(0.85*f'c*1 m)  As := My0117/(0.9*(d - a*1*m/2)*fy)
# As =  <As_min  =>  Armadura mínima =>Φ8@16
# Mex0117 := Ku/mex*(1 + α*Δx)*k  Mex0117 = 2.02834 tonnef*m/m  Momento negativo último en lado corto
# As := Mex0117/(0.9*(0.9*d)*fy) = 3.89795 cm^2/m  a := As*fy/(0.85*f'c*1 m) = 0.550299 mm/m  As := Mex0117/(0.9*(d - a*1 m/2)*fy)
# As = 3.5146 cm^2/m  >As_min  =>  Φ8@14
# Mey0117 := Ku/mey*(1 + α*Δy)*k  Mey0117 = 2.958 tonnef*m/m  Momento negativo último en lado largo
# As := Mey0117/(0.9*(0.9*d)*fy) = 5.68451 cm^2/m  a := As*fy/(0.85*f'c*1 m) = 0.80252 mm/m  As := Mey0117/(0.9*(d - a*1 m/2)*fy)
# As = 5.12978 cm^2/m  >As_min  =>  Φ10@15
# LOSA 0118  Caso: 6
#
# 2.- Dimensiones de Losa (Lx, Ly,e)
#
# Lx := 7.16 m  Ly := 11.34 m  e := 17 cm  ε := Ly/Lx = 1.5838  ε := r.upp(ε) = 1.6
# 3.- Parámetros
#
# k := 0.58  λ := 35
# e_min := k*Lx/λ + rec = 13.8651 cm  e_min := r.up(e_min) = 14 cm
# mx := 46.1  my := 163  Δx := 1.39
# mex := 20.5  mey := 27.9  Δy := 1.39
# AS_min := e*0.18% = 3.06 cm^2/m
# Armadura mínima =>Φ8@16
# 4.- Cargas
#
# PP_losa := γ_h*e = 0.425 tonnef/m^2
# PP_t := PP_losa + PP_adic = 0.875 tonnef/m^2
# q_u := 1.2*PP_t + 1.6*SC  q_u = 1.85 tonnef/m^2
# Ku := q_u*(Lx*Ly) = 150.21 tonnef*m/m  α := SC/(2*q_u) = 0.135135
# 5.- Momento últimos
# Mx0118 := Ku/mx*(1 + α*Δx)*k  Mx0118 = 2.24482 tonnef*m/m  Momento positivo último en lado corto
# As := Mx0118/(0.9*(0.9*d)*fy) = 4.31397 cm^2/m  a := As*fy/(0.85*f'c*1 m) = 0.609031 mm/m  As := Mx0118/(0.9*(d - a*1 m/2)*fy)
# As = 3.89047 cm^2/m  >As_min  =>  Φ10@20
# My0118 := Ku/my*(1 + α*Δy)*k  My0118 = 0.634885 tonnef*m/m  Momento positivo último en lado largo
# As := My0118/(0.9*(0.9*d)*fy) = 1.22009 cm^2/m  a := As*fy/(0.85*f'c*1 m) = 0.172247 mm/m  As := My0118/(0.9*(d - a*1 m/2)*fy)
# As = 1.09871 cm^2/m  <As_min  =>  Armadura mínima =>Φ8@16
# Mex0118 := Ku/mex*(1 + α*Δx)*k  Mex0118 = 5.04811 tonnef*m/m  Momento negativo último en lado corto
# As := Mex0118/(0.9*(0.9*d)*fy) = 9.70117 cm^2/m  a := As*fy/(0.85*f'c*1 m) = 1.36958 mm/m  As := Mex0118/(0.9*(d - a*1 m/2)*fy)
# As = 8.7711 cm^2/m  >As_min  =>  Φ12@12
# Mey0118 := Ku/mey*(1 + α*Δy)*k  Mey0118 = 3.70919 tonnef*m/m  Momento negativo último en lado largo
# As := Mey0118/(0.9*(0.9*d)*fy) = 7.1281 cm^2/m  a := As*fy/(0.85*f'c*1 m) = 1.00632 mm/m  As := Mey0118/(0.9*(d - a*1 m/2)*fy)
# As = 6.43688 cm^2/m  >As_min  =>  Φ10@12
# LOSA 0119  Caso: 6
#
# 2.- Dimensiones de Losa (Lx, Ly,e)
#
# Lx := 1.4 m  Ly := 11.2 m  e := 17 cm  ε := Ly/Lx = 8  ε := r.upp(ε) = 15.1
# 3.- Parámetros
#
# k := 0.58  λ := 35
# e_min := k*Lx/λ + rec = 4.32 cm  e_min := r.up(e_min) = 5 cm
# mx := q_u*Ly^2/(17*tonnef) = 13.6508  my := 0  Δx := 0
# mex := q_u*Ly^2/(12*tonnef) = 19.3387  mey := q_u*Ly^2/(17.5*tonnef) = 13.2608  Δy := 0
# AS_min := e*0.18% = 3.06 cm^2/m
# Armadura mínima =>Φ8@16
# 4.- Cargas
#
# PP_losa := γ_h*e = 0.425 tonnef/m^2
# PP_t := PP_losa + PP_adic = 0.875 tonnef/m^2
# q_u := 1.2*PP_t + 1.6*SC  q_u = 1.85 tonnef/m^2
# Ku := q_u*(Lx*Ly) = 29.008 tonnef*m/m  α := SC/(2*q_u) = 0.135135
# 5.- Momento últimos
# Mx0119 := Ku/mx*(1 + α*Δx)*k  Mx0119 = 1.2325 tonnef*m/m  Momento positivo último en lado corto
# As := Mx0119/(0.9*(0.9*d)*fy) = 2.36855 cm^2/m  a := As*fy/(0.85*f'c*1 m) = 0.334383 mm/m  As := Mx0119/(0.9*(d - a*1 m/2)*fy)
# As = 2.13407 cm^2/m  <As_min  =>  Armadura mínima =>Φ8@16
# My0119 := Ku/my*(1 + α*Δy)*k  My0119 =  Momento positivo último en lado largo
# As := My0119/(0.9*(0.9*d)*fy)  a := As*fy/(0.85*f'c*1 m)  As := My0119/(0.9*(d - a*1 m/2)*fy)
# As =  <As_min  =>  Armadura mínima =>Φ8@16
# Mex0119 := Ku/mex*(1 + α*Δx)*k  Mex0119 = 0.87 tonnef*m/m  Momento negativo último en lado corto
# As := Mex0119/(0.9*(0.9*d)*fy) = 1.67192 cm^2/m  a := As*fy/(0.85*f'c*1 m) = 0.236035 mm/m  As := Mex0119/(0.9*(d - a*1 m/2)*fy)
# As = 1.50591 cm^2/m  <As_min  =>  Armadura mínima =>Φ8@16
# Mey0119 := Ku/mey*(1 + α*Δy)*k  Mey0119 = 1.26875 tonnef*m/m  Momento negativo último en lado largo
# As := Mey0119/(0.9*(0.9*d)*fy) = 2.43821 cm^2/m  a := As*fy/(0.85*f'c*1 m) = 0.344218 mm/m  As := Mey0119/(0.9*(d - a*1 m/2)*fy)
# As = 2.19691 cm^2/m  <As_min  =>  Armadura mínima =>Φ8@16
# LOSA 0120  Caso: 5b
#
# 2.- Dimensiones de Losa (Lx, Ly,e)
#
# Lx := 2.1 m  Ly := 4.04 m  e := 17 cm  ε := Ly/Lx = 1.92381  ε := r.upp(ε) = 2
# 3.- Parámetros
#
# k := 0.75  λ := 35
# e_min := k*Lx/λ + rec = 6.5 cm  e_min := r.up(e_min) = 7 cm
# mx := 37.5  my := 202  Δx := 0.68
# mex := 17.6  mey := 24.6  Δy := 0.46
# AS_min := e*0.18% = 3.06 cm^2/m
# Armadura mínima =>Φ8@16
# 4.- Cargas
#
# PP_losa := γ_h*e = 0.425 tonnef/m^2
# PP_t := PP_losa + PP_adic = 0.875 tonnef/m^2
# q_u := 1.2*PP_t + 1.6*SC  q_u = 1.85 tonnef/m^2
# Ku := q_u*(Lx*Ly) = 15.6954 tonnef*m/m  α := SC/(2*q_u) = 0.135135
# 5.- Momento últimos
# Mx0120 := Ku/mx*(1 + α*Δx)*k  Mx0120 = 0.342754 tonnef*m/m  Momento positivo último en lado corto
# As := Mx0120/(0.9*(0.9*d)*fy) = 0.658684 cm^2/m  a := As*fy/(0.85*f'c*1 m) = 0.0929907 mm/m  As := Mx0120/(0.9*(d - a*1 m/2)*fy)
# As = 0.592999 cm^2/m  <As_min  =>  Armadura mínima =>Φ8@16
# My0120 := Ku/my*(1 + α*Δy)*k  My0120 = 0.0618975 tonnef*m/m  Momento positivo último en lado largo
# As := My0120/(0.9*(0.9*d)*fy) = 0.118951 cm^2/m  a := As*fy/(0.85*f'c*1 m) = 0.0167931 mm/m  As := My0120/(0.9*(d - a*1 m/2)*fy)
# As = 0.107062 cm^2/m  <As_min  =>  Armadura mínima =>Φ8@16
# Mex0120 := Ku/mex*(1 + α*Δx)*k  Mex0120 = 0.730299 tonnef*m/m  Momento negativo último en lado corto
# As := Mex0120/(0.9*(0.9*d)*fy) = 1.40345 cm^2/m  a := As*fy/(0.85*f'c*1 m) = 0.198134 mm/m  As := Mex0120/(0.9*(d - a*1 m/2)*fy)
# As = 1.26394 cm^2/m  <As_min  =>  Armadura mínima =>Φ8@16
# Mey0120 := Ku/mey*(1 + α*Δy)*k  Mey0120 = 0.508264 tonnef*m/m  Momento negativo último en lado largo
# As := Mey0120/(0.9*(0.9*d)*fy) = 0.976752 cm^2/m  a := As*fy/(0.85*f'c*1 m) = 0.137894 mm/m  As := Mey0120/(0.9*(d - a*1 m/2)*fy)
# As = 0.879481 cm^2/m  <As_min  =>  Armadura mínima =>Φ8@16
# LOSA 0121  Caso: 6
#
# 2.- Dimensiones de Losa (Lx, Ly,e)
#
# Lx := 2.9 m  Ly := 6.36 m  e := 17 cm  ε := Ly/Lx = 2.1931  ε := r.upp(ε) = 3.2
# 3.- Parámetros
#
# k := 0.58  λ := 35
# e_min := k*Lx/λ + rec = 6.80571 cm  e_min := r.up(e_min) = 7 cm
# mx := q_u*Ly^2/(17*tonnef) = 4.40187  my := 0  Δx := 0
# mex := q_u*Ly^2/(12*tonnef) = 6.23598  mey := q_u*Ly^2/(17.5*tonnef) = 4.2761  Δy := 0
# AS_min := e*0.18% = 3.06 cm^2/m
# Armadura mínima =>Φ8@16
# 4.- Cargas
#
# PP_losa := γ_h*e = 0.425 tonnef/m^2
# PP_t := PP_losa + PP_adic = 0.875 tonnef/m^2
# q_u := 1.2*PP_t + 1.6*SC  q_u = 1.85 tonnef/m^2
# Ku := q_u*(Lx*Ly) = 34.1214 tonnef*m/m  α := SC/(2*q_u) = 0.135135
# 5.- Momento últimos
# Mx0121 := Ku/mx*(1 + α*Δx)*k  Mx0121 = 4.49591 tonnef*m/m  Momento positivo último en lado corto
# As := Mx0121/(0.9*(0.9*d)*fy) = 8.63998 cm^2/m  a := As*fy/(0.85*f'c*1 m) = 1.21976 mm/m  As := Mx0121/(0.9*(d - a*1 m/2)*fy)
# As = 7.80773 cm^2/m  >As_min  =>  Φ10@10
# My0121 := Ku/my*(1 + α*Δy)*k  My0121 =  Momento positivo último en lado largo
# As := My0121/(0.9*(0.9*d)*fy)  a := As*fy/(0.85*f'c*1 m)  As := My0121/(0.9*(d - a*1 m/2)*fy)
# As =  <As_min  =>  Armadura mínima =>Φ8@16
# Mex0121 := Ku/mex*(1 + α*Δx)*k  Mex0121 = 3.17358 tonnef*m/m  Momento negativo último en lado corto
# As := Mex0121/(0.9*(0.9*d)*fy) = 6.09881 cm^2/m  a := As*fy/(0.85*f'c*1 m) = 0.861009 mm/m  As := Mex0121/(0.9*(d - a*1 m/2)*fy)
# As = 5.50473 cm^2/m  >As_min  =>  Φ10@14
# Mey0121 := Ku/mey*(1 + α*Δy)*k  Mey0121 = 4.62814 tonnef*m/m  Momento negativo último en lado largo
# As := Mey0121/(0.9*(0.9*d)*fy) = 8.8941 cm^2/m  a := As*fy/(0.85*f'c*1 m) = 1.25564 mm/m  As := Mey0121/(0.9*(d - a*1 m/2)*fy)
# As = 8.03833 cm^2/m  >As_min  =>  Φ14@12
# LOSA 0122  Caso: 6
#
# 2.- Dimensiones de Losa (Lx, Ly,e)
#
# Lx := 4.25 m  Ly := 6.36 m  e := 17 cm  ε := Ly/Lx = 1.49647  ε := r.upp(ε) = 1.5
# 3.- Parámetros
#
# k := 0.58  λ := 35
# e_min := k*Lx/λ + rec = 9.04286 cm  e_min := r.up(e_min) = 10 cm
# mx := 44.4  my := 140.5  Δx := 1.31
# mex := 19.8  mey := 26.2  Δy := 1.31
# AS_min := e*0.18% = 3.06 cm^2/m
# Armadura mínima =>Φ8@16
# 4.- Cargas
#
# PP_losa := γ_h*e = 0.425 tonnef/m^2
# PP_t := PP_losa + PP_adic = 0.875 tonnef/m^2
# q_u := 1.2*PP_t + 1.6*SC  q_u = 1.85 tonnef/m^2
# Ku := q_u*(Lx*Ly) = 50.0055 tonnef*m/m  α := SC/(2*q_u) = 0.135135
# 5.- Momento últimos
# Mx0122 := Ku/mx*(1 + α*Δx)*k  Mx0122 = 0.768863 tonnef*m/m  Momento positivo último en lado corto
# As := Mx0122/(0.9*(0.9*d)*fy) = 1.47756 cm^2/m  a := As*fy/(0.85*f'c*1 m) = 0.208596 mm/m  As := Mx0122/(0.9*(d - a*1 m/2)*fy)
# As = 1.33073 cm^2/m  <As_min  =>  Armadura mínima =>Φ8@16
# My0122 := Ku/my*(1 + α*Δy)*k  My0122 = 0.242972 tonnef*m/m  Momento positivo último en lado largo
# As := My0122/(0.9*(0.9*d)*fy) = 0.466929 cm^2/m  a := As*fy/(0.85*f'c*1 m) = 0.0659194 mm/m  As := My0122/(0.9*(d - a*1 m/2)*fy)
# As = 0.420329 cm^2/m  <As_min  =>  Armadura mínima =>Φ8@16
# Mex0122 := Ku/mex*(1 + α*Δx)*k  Mex0122 = 1.72412 tonnef*m/m  Momento negativo último en lado corto
# As := Mex0122/(0.9*(0.9*d)*fy) = 3.31331 cm^2/m  a := As*fy/(0.85*f'c*1 m) = 0.467761 mm/m  As := Mex0122/(0.9*(d - a*1 m/2)*fy)
# As = 2.98664 cm^2/m  <As_min  =>  Armadura mínima =>Φ8@16
# Mey0122 := Ku/mey*(1 + α*Δy)*k  Mey0122 = 1.30296 tonnef*m/m  Momento negativo último en lado largo
# As := Mey0122/(0.9*(0.9*d)*fy) = 2.50395 cm^2/m  a := As*fy/(0.85*f'c*1 m) = 0.353499 mm/m  As := Mey0122/(0.9*(d - a*1 m/2)*fy)
# As = 2.25622 cm^2/m  <As_min  =>  Armadura mínima =>Φ8@16
# LOSA 0123  Caso: 6
#
# 2.- Dimensiones de Losa (Lx, Ly,e)
#
# Lx := 6.49 m  Ly := 7.16 m  e := 17 cm  ε := Ly/Lx = 1.10324  ε := r.upp(ε) = 1.2
# 3.- Parámetros
#
# k := 0.56  λ := 35
# e_min := k*Lx/λ + rec = 12.384 cm  e_min := r.up(e_min) = 13 cm
# mx := 47.2  my := 78.9  Δx := 1.1
# mex := 18.6  mey := 21.5  Δy := 1.1
# AS_min := e*0.18% = 3.06 cm^2/m
# Armadura mínima =>Φ8@16
# 4.- Cargas
#
# PP_losa := γ_h*e = 0.425 tonnef/m^2
# PP_t := PP_losa + PP_adic = 0.875 tonnef/m^2
# q_u := 1.2*PP_t + 1.6*SC  q_u = 1.85 tonnef/m^2
# Ku := q_u*(Lx*Ly) = 85.9665 tonnef*m/m  α := SC/(2*q_u) = 0.135135
# 5.- Momento últimos
# Mx0123 := Ku/mx*(1 + α*Δx)*k  Mx0123 = 1.17156 tonnef*m/m  Momento positivo último en lado corto
# As := Mx0123/(0.9*(0.9*d)*fy) = 2.25143 cm^2/m  a := As*fy/(0.85*f'c*1 m) = 0.317848 mm/m  As := Mx0123/(0.9*(d - a*1 m/2)*fy)
# As = 2.02843 cm^2/m  <As_min  =>  Armadura mínima =>Φ8@16
# My0123 := Ku/my*(1 + α*Δy)*k  My0123 = 0.700854 tonnef*m/m  Momento positivo último en lado largo
# As := My0123/(0.9*(0.9*d)*fy) = 1.34686 cm^2/m  a := As*fy/(0.85*f'c*1 m) = 0.190145 mm/m  As := My0123/(0.9*(d - a*1 m/2)*fy)
# As = 1.21294 cm^2/m  <As_min  =>  Armadura mínima =>Φ8@16
# Mex0123 := Ku/mex*(1 + α*Δx)*k  Mex0123 = 2.97298 tonnef*m/m  Momento negativo último en lado corto
# As := Mex0123/(0.9*(0.9*d)*fy) = 5.7133 cm^2/m  a := As*fy/(0.85*f'c*1 m) = 0.806583 mm/m  As := Mex0123/(0.9*(d - a*1 m/2)*fy)
# As = 5.15583 cm^2/m  >As_min  =>  Φ10@15
# Mey0123 := Ku/mey*(1 + α*Δy)*k  Mey0123 = 2.57197 tonnef*m/m  Momento negativo último en lado largo
# As := Mey0123/(0.9*(0.9*d)*fy) = 4.94267 cm^2/m  a := As*fy/(0.85*f'c*1 m) = 0.697788 mm/m  As := Mey0123/(0.9*(d - a*1 m/2)*fy)
# As = 4.45877 cm^2/m  >As_min  =>  Φ8@11
# LOSA 0124  Caso: 6
#
# 2.- Dimensiones de Losa (Lx, Ly,e)
#
# Lx := 8.24 m  Ly := 18.54 m  e := 17 cm  ε := Ly/Lx = 2.25  ε := r.upp(ε) = 3.3
# 3.- Parámetros
#
# k := 0.58  λ := 35
# e_min := k*Lx/λ + rec = 15.6549 cm  e_min := r.up(e_min) = 16 cm
# mx := q_u*Ly^2/(17*tonnef) = 37.4061  my := 0  Δx := 0
# mex := q_u*Ly^2/(12*tonnef) = 52.992  mey := q_u*Ly^2/(17.5*tonnef) = 36.3373  Δy := 0AS_min := e*0.18% = 3.06 cm^2/m
# Armadura mínima =>Φ8@16
# 4.- Cargas
#
# PP_losa := γ_h*e = 0.425 tonnef/m^2
# PP_t := PP_losa + PP_adic = 0.875 tonnef/m^2
# q_u := 1.2*PP_t + 1.6*SC  q_u = 1.85 tonnef/m^2
# Ku := q_u*(Lx*Ly) = 282.624 tonnef*m/m  α := SC/(2*q_u) = 0.135135
# 5.- Momento últimos
# Mx0124 := Ku/mx*(1 + α*Δx)*k  Mx0124 = 4.38222 tonnef*m/m  Momento positivo último en lado corto
# As := Mx0124/(0.9*(0.9*d)*fy) = 8.4215 cm^2/m  a := As*fy/(0.85*f'c*1 m) = 1.18892 mm/m  As := Mx0124/(0.9*(d - a*1 m/2)*fy)
# As = 7.60951 cm^2/m  >As_min  =>  Φ10@10
# My0124 := Ku/my*(1 + α*Δy)*k  My0124 =  Momento positivo último en lado largo
# As := My0124/(0.9*(0.9*d)*fy)  a := As*fy/(0.85*f'c*1 m)  As := My0124/(0.9*(d - a*1 m/2)*fy)
# As =  <As_min  =>  Armadura mínima =>Φ8@16
# Mex0124 := Ku/mex*(1 + α*Δx)*k  Mex0124 = 3.09333 tonnef*m/m  Momento negativo último en lado corto
# As := Mex0124/(0.9*(0.9*d)*fy) = 5.94459 cm^2/m  a := As*fy/(0.85*f'c*1 m) = 0.839236 mm/m  As := Mex0124/(0.9*(d - a*1 m/2)*fy)
# As = 5.36514 cm^2/m  >As_min  =>  Φ10@14
# Mey0124 := Ku/mey*(1 + α*Δy)*k  Mey0124 = 4.51111 tonnef*m/m  Momento negativo último en lado largo
# As := Mey0124/(0.9*(0.9*d)*fy) = 8.66919 cm^2/m  a := As*fy/(0.85*f'c*1 m) = 1.22389 mm/m  As := Mey0124/(0.9*(d - a*1 m/2)*fy)
# As = 7.83423 cm^2/m  >As_min  =>  Φ8@11
# LOSA 0125  Caso: 6
#
# 2.- Dimensiones de Losa (Lx, Ly,e)
#
# Lx := 5 m  Ly := 8.24 m  e := 17 cm  ε := Ly/Lx = 1.648  ε := r.upp(ε) = 1.7
# 3.- Parámetros
#
# k := 0.58  λ := 35
# e_min := k*Lx/λ + rec = 10.2857 cm  e_min := r.up(e_min) = 11 cm
# mx := 46.1  my := 163  Δx := 1.39
# mex := 20.5  mey := 27.9  Δy := 1.39
# AS_min := e*0.18% = 3.06 cm^2/m
# Armadura mínima =>Φ8@16
# 4.- Cargas
#
# PP_losa := γ_h*e = 0.425 tonnef/m^2
# PP_t := PP_losa + PP_adic = 0.875 tonnef/m^2
# q_u := 1.2*PP_t + 1.6*SC  q_u = 1.85 tonnef/m^2
# Ku := q_u*(Lx*Ly) = 76.22 tonnef*m/m  α := SC/(2*q_u) = 0.135135
# 5.- Momento últimos
# Mx0125 := Ku/mx*(1 + α*Δx)*k  Mx0125 = 1.13908 tonnef*m/m  Momento positivo último en lado corto
# As := Mx0125/(0.9*(0.9*d)*fy) = 2.18901 cm^2/m  a := As*fy/(0.85*f'c*1 m) = 0.309037 mm/m  As := Mx0125/(0.9*(d - a*1 m/2)*fy)
# As = 1.97214 cm^2/m  <As_min  =>  Armadura mínima =>Φ8@16
# My0125 := Ku/my*(1 + α*Δy)*k  My0125 = 0.322156 tonnef*m/m  Momento positivo último en lado largo
# As := My0125/(0.9*(0.9*d)*fy) = 0.619101 cm^2/m  a := As*fy/(0.85*f'c*1 m) = 0.0874025 mm/m  As := My0125/(0.9*(d - a*1 m/2)*fy)
# As = 0.557353 cm^2/m  <As_min  =>  Armadura mínima =>Φ8@16
# Mex0125 := Ku/mex*(1 + α*Δx)*k  Mex0125 = 2.56153 tonnef*m/m  Momento negativo último en lado corto
# As := Mex0125/(0.9*(0.9*d)*fy) = 4.92261 cm^2/m  a := As*fy/(0.85*f'c*1 m) = 0.694957 mm/m  As := Mex0125/(0.9*(d - a*1 m/2)*fy)
# As = 4.44063 cm^2/m  >As_min  =>  Φ8@10
# Mey0125 := Ku/mey*(1 + α*Δy)*k  Mey0125 = 1.88213 tonnef*m/m  Momento negativo último en lado largo
# As := Mey0125/(0.9*(0.9*d)*fy) = 3.61697 cm^2/m  a := As*fy/(0.85*f'c*1 m) = 0.510631 mm/m  As := Mey0125/(0.9*(d - a*1 m/2)*fy)
# As = 3.26082 cm^2/m  >As_min  =>  Φ8@15
# LOSA 0126  Caso: 6
#
# 2.- Dimensiones de Losa (Lx, Ly,e)
#
# Lx := 5.52 m  Ly := 8.24 m  e := 17 cm  ε := Ly/Lx = 1.49275  ε := r.upp(ε) = 1.5
# 3.- Parámetros
#
# k := 0.58  λ := 35
# e_min := k*Lx/λ + rec = 11.1474 cm  e_min := r.up(e_min) = 12 cm
# mx := 44.4  my := 140.5  Δx := 1.31
# mex := 19.8  mey := 26.2  Δy := 1.31
# AS_min := e*0.18% = 3.06 cm^2/m
# Armadura mínima =>Φ8@16
# 4.- Cargas
#
# PP_losa := γ_h*e = 0.425 tonnef/m^2
# PP_t := PP_losa + PP_adic = 0.875 tonnef/m^2
# q_u := 1.2*PP_t + 1.6*SC  q_u = 1.85 tonnef/m^2
# Ku := q_u*(Lx*Ly) = 84.1469 tonnef*m/m  α := SC/(2*q_u) = 0.135135
# 5.- Momento últimos
# Mx0126 := Ku/mx*(1 + α*Δx)*k  Mx0126 = 1.29381 tonnef*m/m  Momento positivo último en lado corto
# As := Mx0126/(0.9*(0.9*d)*fy) = 2.48636 cm^2/m  a := As*fy/(0.85*f'c*1 m) = 0.351016 mm/m  As := Mx0126/(0.9*(d - a*1 m/2)*fy)
# As = 2.24035 cm^2/m  <As_min  =>  Armadura mínima =>Φ8@16
# My0126 := Ku/my*(1 + α*Δy)*k  My0126 = 0.408861 tonnef*m/m  Momento positivo último en lado largo
# As := My0126/(0.9*(0.9*d)*fy) = 0.785726 cm^2/m  a := As*fy/(0.85*f'c*1 m) = 0.110926 mm/m  As := My0126/(0.9*(d - a*1 m/2)*fy)
# As = 0.707415 cm^2/m  <As_min  =>  Armadura mínima =>Φ8@16
# Mex0126 := Ku/mex*(1 + α*Δx)*k  Mex0126 = 2.90126 tonnef*m/m  Momento negativo último en lado corto
# As := Mex0126/(0.9*(0.9*d)*fy) = 5.57548 cm^2/m  a := As*fy/(0.85*f'c*1 m) = 0.787127 mm/m  As := Mex0126/(0.9*(d - a*1 m/2)*fy)
# As = 5.03113 cm^2/m  >As_min  =>  Φ8@10
# Mey0126 := Ku/mey*(1 + α*Δy)*k  Mey0126 = 2.19256 tonnef*m/m  Momento negativo último en lado largo
# As := Mey0126/(0.9*(0.9*d)*fy) = 4.21353 cm^2/m  a := As*fy/(0.85*f'c*1 m) = 0.594852 mm/m  As := Mey0126/(0.9*(d - a*1 m/2)*fy)
# As = 3.79971 cm^2/m  >As_min  =>  Φ8@13
# LOSA 0127  Caso: 6
#
# 2.- Dimensiones de Losa (Lx, Ly,e)
#
# Lx := 7.09 m  Ly := 10.15 m  e := 17 cm  ε := Ly/Lx = 1.43159  ε := r.upp(ε) = 1.5
# 3.- Parámetros
#
# k := 0.58  λ := 35
# e_min := k*Lx/λ + rec = 13.7491 cm  e_min := r.up(e_min) = 14 cm
# mx := 44.4  my := 140.5  Δx := 1.31
# mex := 19.8  mey := 26.2  Δy := 1.31
# AS_min := e*0.18% = 3.06 cm^2/m
# Armadura mínima =>Φ8@16
# 4.- Cargas
#
# PP_losa := γ_h*e = 0.425 tonnef/m^2
# PP_t := PP_losa + PP_adic = 0.875 tonnef/m^2
# q_u := 1.2*PP_t + 1.6*SC  q_u = 1.85 tonnef/m^2
# Ku := q_u*(Lx*Ly) = 133.132 tonnef*m/m  α := SC/(2*q_u) = 0.135135
# 5.- Momento últimos
# Mx0127 := Ku/mx*(1 + α*Δx)*k  Mx0127 = 2.04699 tonnef*m/m  Momento positivo último en lado corto
# As := Mx0127/(0.9*(0.9*d)*fy) = 3.93378 cm^2/m  a := As*fy/(0.85*f'c*1 m) = 0.555358 mm/m  As := Mx0127/(0.9*(d - a*1 m/2)*fy)
# As = 3.54697 cm^2/m  >As_min  =>  Φ8@14
# My0127 := Ku/my*(1 + α*Δy)*k  My0127 = 0.646878 tonnef*m/m  Momento positivo último en lado largo
# As := My0127/(0.9*(0.9*d)*fy) = 1.24313 cm^2/m  a := As*fy/(0.85*f'c*1 m) = 0.175501 mm/m  As := My0127/(0.9*(d - a*1 m/2)*fy)
# As = 1.11947 cm^2/m  <As_min  =>  Armadura mínima =>Φ8@16
# Mex0127 := Ku/mex*(1 + α*Δx)*k  Mex0127 = 4.59022 tonnef*m/m  Momento negativo último en lado corto
# As := Mex0127/(0.9*(0.9*d)*fy) = 8.82121 cm^2/m  a := As*fy/(0.85*f'c*1 m) = 1.24535 mm/m  As := Mex0127/(0.9*(d - a*1 m/2)*fy)
# As = 7.97219 cm^2/m  >As_min  =>  Φ12@14
# Mey0127 := Ku/mey*(1 + α*Δy)*k  Mey0127 = 3.46894 tonnef*m/m  Momento negativo último en lado largo
# As := Mey0127/(0.9*(0.9*d)*fy) = 6.66641 cm^2/m  a := As*fy/(0.85*f'c*1 m) = 0.941141 mm/m  As := Mey0127/(0.9*(d - a*1 m/2)*fy)
# As = 6.01865 cm^2/m  >As_min  =>  Φ10@13
# LOSA 0128  Caso: 6
#
# 2.- Dimensiones de Losa (Lx, Ly,e)
#
# Lx := 3.06 m  Ly := 10.15 m  e := 17 cm  ε := Ly/Lx = 3.31699  ε := r.upp(ε) = 5.4
# 3.- Parámetros
#
# k := 0.58  λ := 35
# e_min := k*Lx/λ + rec = 7.07086 cm  e_min := r.up(e_min) = 8 cm
# mx := q_u*Ly^2/(17*tonnef) = 11.2113  my := 0  Δx := 0
# mex := q_u*Ly^2/(12*tonnef) = 15.8826  mey := q_u*Ly^2/(17.5*tonnef) = 10.891  Δy := 0AS_min := e*0.18% = 3.06 cm^2/m
# Armadura mínima =>Φ8@16
# 4.- Cargas
#
# PP_losa := γ_h*e = 0.425 tonnef/m^2
# PP_t := PP_losa + PP_adic = 0.875 tonnef/m^2
# q_u := 1.2*PP_t + 1.6*SC  q_u = 1.85 tonnef/m^2
# Ku := q_u*(Lx*Ly) = 57.4592 tonnef*m/m  α := SC/(2*q_u) = 0.135135
# 5.- Momento últimos
# Mx0128 := Ku/mx*(1 + α*Δx)*k  Mx0128 = 2.97257 tonnef*m/m  Momento positivo último en lado corto
# As := Mx0128/(0.9*(0.9*d)*fy) = 5.71252 cm^2/m  a := As*fy/(0.85*f'c*1 m) = 0.806473 mm/m  As := Mx0128/(0.9*(d - a*1 m/2)*fy)
# As = 5.15512 cm^2/m  >As_min  =>  Φ10@15
# My0128 := Ku/my*(1 + α*Δy)*k  My0128 =  Momento positivo último en lado largo
# As := My0128/(0.9*(0.9*d)*fy)  a := As*fy/(0.85*f'c*1 m)  As := My0128/(0.9*(d - a*1 m/2)*fy)
# As =  <As_min  =>  Armadura mínima =>Φ8@16
# Mex0128 := Ku/mex*(1 + α*Δx)*k  Mex0128 = 2.09829 tonnef*m/m  Momento negativo último en lado corto
# As := Mex0128/(0.9*(0.9*d)*fy) = 4.03236 cm^2/m  a := As*fy/(0.85*f'c*1 m) = 0.569275 mm/m  As := Mex0128/(0.9*(d - a*1 m/2)*fy)
# As = 3.63603 cm^2/m  >As_min  =>  Φ8@13
# Mey0128 := Ku/mey*(1 + α*Δy)*k  Mey0128 = 3.06 tonnef*m/m  Momento negativo último en lado largo
# As := Mey0128/(0.9*(0.9*d)*fy) = 5.88053 cm^2/m  a := As*fy/(0.85*f'c*1 m) = 0.830193 mm/m  As := Mey0128/(0.9*(d - a*1 m/2)*fy)
# As = 5.30716 cm^2/m  >As_min  =>  Φ10@14
# LOSA 0129  Caso: 6
#
# 2.- Dimensiones de Losa (Lx, Ly,e)
#
# Lx := 2.32 m  Ly := 4.3 m  e := 17 cm  ε := Ly/Lx = 1.85345  ε := r.upp(ε) = 1.9
# 3.- Parámetros
#
# k := 0.58  λ := 35
# e_min := k*Lx/λ + rec = 5.84457 cm  e_min := r.up(e_min) = 6 cm
# mx := 48.8  my := 190  Δx := 1.39
# mex := 22  mey := 31.4  Δy := 1.39
# AS_min := e*0.18% = 3.06 cm^2/m
# Armadura mínima =>Φ8@16
# 4.- Cargas
#
# PP_losa := γ_h*e = 0.425 tonnef/m^2
# PP_t := PP_losa + PP_adic = 0.875 tonnef/m^2
# q_u := 1.2*PP_t + 1.6*SC  q_u = 1.85 tonnef/m^2
# Ku := q_u*(Lx*Ly) = 18.4556 tonnef*m/m  α := SC/(2*q_u) = 0.135135
# 5.- Momento últimos
# Mx0129 := Ku/mx*(1 + α*Δx)*k  Mx0129 = 0.260551 tonnef*m/m  Momento positivo último en lado corto
# As := Mx0129/(0.9*(0.9*d)*fy) = 0.500713 cm^2/m  a := As*fy/(0.85*f'c*1 m) = 0.0706889 mm/m  As := Mx0129/(0.9*(d - a*1 m/2)*fy)
# As = 0.450748 cm^2/m  <As_min  =>  Armadura mínima =>Φ8@16
# My0129 := Ku/my*(1 + α*Δy)*k  My0129 = 0.0669206 tonnef*m/m  Momento positivo último en lado largo
# As := My0127/(0.9*(0.9*d)*fy) = 1.24313 cm^2/m  a := As*fy/(0.85*f'c*1 m) = 0.175501 mm/m  As := My0129/(0.9*(d - a*1 m/2)*fy)
# As = 0.115811 cm^2/m  <As_min  =>  Armadura mínima =>Φ8@16
# Mex0129 := Ku/mex*(1 + α*Δx)*k  Mex0129 = 0.57795 tonnef*m/m  Momento negativo último en lado corto
# As := Mex0129/(0.9*(0.9*d)*fy) = 1.11067 cm^2/m  a := As*fy/(0.85*f'c*1 m) = 0.156801 mm/m  As := Mex0129/(0.9*(d - a*1 m/2)*fy)
# As = 1.00013 cm^2/m  <As_min  =>  Armadura mínima =>Φ8@16
# Mey0129 := Ku/mey*(1 + α*Δy)*k  Mey0129 = 0.404933 tonnef*m/m  Momento negativo último en lado largo
# As := Mey0129/(0.9*(0.9*d)*fy) = 0.778178 cm^2/m  a := As*fy/(0.85*f'c*1 m) = 0.10986 mm/m  As := Mey0129/(0.9*(d - a*1 m/2)*fy)
# As = 0.700616 cm^2/m  <As_min  =>  Armadura mínima =>Φ8@16
