f_c := 350 kgf/cm^2
f_y := 4200 kgf/cm^2
ε_cu := 0.003
ε_y := 0.0021
h := 50 cm = 0.5 m
b := 30 cm
rec := 4 cm
d := h - rec
d = 0.46 m
# Flexión
A_s.min := max(sqrt(f_c*kgf/cm^2)/(4*f_y)*b*d, 1.4*b*d/(f_y*cm^2/kgf)) = 1.53675 cm^2
M_n := 30.92 tonnef*m
β_1 :=
    if f_c < 300 kgf/cm^2
        0.85
    else if f_c > 550 kgf/cm^2
        0.65
    else
        0.85 - 0.008*(f_c/MPa - 30)
β_1 = 0.815414
solve block
    # guess values
    ρ := 0.001
    ϕ := 0.9
    # constraints
    M_n/(b*d^2) == ϕ*ρ*f_y*(1 - 0.588*ρ*f_y/f_c)
    # solver
    NL := Find(ρ)
end solve block
ρ := NL
ρ = 0.0143359
ρ_min := max(0.25*sqrt(25)/420, 1.4 MPa/(420 MPa))
ρ_min = 0.00333333
ρ_b := 0.85*β_1*f_c/f_y*ε_cu/(ε_cu + ε_y)
ρ_b = 0.0339756
ρ_max := 0.75*ρ_b
ρ_max = 0.0254817
ρ_req := max(min(ρ, ρ_max), ρ_min)
ρ_req = 0.0143359
A_s_req := ρ_req*b*d/1
A_s_req = 19.7836 cm^2
4*ϕ28
A_s := 4*π*(28 mm/2)^2 = 24.6301 cm^2
M_n := 0.9*A_s*f_y*(d - A_s*f_y/(0.85*f_c*b)/2) = 37.4313 tonnef*m
M_p := 22.08 tonnef*m
β_1 :=
    if f_c < 300 kgf/cm^2
        0.85
    else if f_c > 550 kgf/cm^2
        0.65
    else
        0.85 - 0.008*(f_c/MPa - 30)
β_1 = 0.815414
solve block
    # guess values
    ρ := 0.001
    ϕ := 0.9
    # constraints
    M_p/(b*d^2) == ϕ*ρ*f_y*(1 - 0.588*ρ*f_y/f_c)
    # solver
    NL := Find(ρ)
end solve block
ρ := NL
ρ = 0.00989222
ρ_min := max(0.25*sqrt(25)/420, 1.4 MPa/(420 MPa))
ρ_min = 0.00333333
ρ_b := 0.85*β_1*f_c/f_y*ε_cu/(ε_cu + ε_y)
ρ_b = 0.0339756
ρ_max := 0.75*ρ_b
ρ_max = 0.0254817
ρ_req := max(min(ρ, ρ_max), ρ_min)
ρ_req = 0.00989222
A_s_req := ρ_req*b*d/1
A_s_req = 13.6513 cm^2
3*ϕ25
A_s := 3*π*(25 mm/2)^2 = 14.7262 cm^2
M_n := 0.9*A_s*f_y*(d - A_s*f_y/(0.85*f_c*b)/2) = 23.6772 tonnef*m
# Corte
ϕ := 0.75
V_u := 22.37 tonnef
f_yt := 420
f_c = 350 kgf/cm^2
V_c := 0.53*sqrt(f_c kgf/cm^2)*b*d
V_c = 13.6832 tonnef
if V_u > ϕ*V_c/2
    1
else
    0
= 1
b = 30 cm
d = 46 cm
d/2 = 23 cm
s := 20 cm
A_min := b*s/(3*f_yt) = 0.47619 cm^2
(V_u/ϕ - V_c)/(ϕ*f_y*d)*s = 2.22822 cm^2
s = 20 cm
ϕ_v := 12 mm
n := 2
A_v := n*ϕ_v^2*π/4
A_v = 2.26195 cm^2
V_s := min(A_v*f_y*d/s, 0.66*sqrt(f_c*MPa)*b*d)
V_s = 21.8504 tonnef
V_n := V_c + V_s
V_n = 35.5336 tonnef
ϕ*V_n = 26.6502 tonnef
