# CI5223-1 Diseño de Albañilería Estructural
# Facultad de Ciencias Físicas y Matemáticas
# Universidad de Chile
# Diseño de Fundaciones
# Memoria de cálculo
# Grupo: | N°1
# Autores: | Mauricio Leal
# Pablo Pizarro
# Ignacio Yañez
# Diseño de fundaciones
# MURO: F4X
σ_suelo_estatico := 8 kgf/cm^2
σ_suelo_sismico := 10 kgf/cm^2
chequeo(x) :=
    if x > 1
        "CUMPLE"
    else
        "REDISEÑAR"
# 1. Dimensiones elementos
# Propiedades y esfuerzos de muro: | Dimensiones zapata:
L_muro := 6.76 m
L_zap := 90 cm + L_muro + 90 cm = 8.56 m
e_muro := 25 cm
B_zap := 200 cm
resistencia(x, y) :=
    if x > y
        "CUMPLE"
    else
        "REDISEÑAR"
γ_H := 2.5 tonnef/m^3
H_zap := 200 cm
N_zap := γ_H*B_zap*L_zap*H_zap = 85.6 tonnef
# 2. Esfuerzos de ETABS
N_PP := -455.244 tonnef
M_PP := -112.8124 tonnef*m
V_PP := 5.8048 tonnef
N_SC := -118.0962 tonnef
M_SC := -20.3411 tonnef*m
V_SC := -1.0577 tonnef
N_SX := 216.7196 tonnef
M_SX := 522.4481 tonnef*m
V_SX := 27.6026 tonnef
N_SY := 157.9424 tonnef
M_SY := 59.8586 tonnef*m
V_SY := 8.2291 tonnef
# 3. Combinaciones
# 3.1. Combinaciones estáticas
# Combinación 1 (PP)
N_est1 := N_zap + |N_PP| = 540.844 tonnef
V_est1 := V_PP = 5.8048 tonnef
M_est1 := M_PP = -112.812 tonnef*m
l := L_zap/6 = 1.42667 m
e := |M_est1/N_est1| = 0.208586 m
L' := 3*(L_zap/2 - e) = 12.2142 m
σ_est1 :=
    if e < l
        max(N_est1/(B_zap*L_zap) + 6*M_est1/(B_zap*L_zap^2), N_est1/(B_zap*L_zap) - 6*M_est1/(B_zap*L_zap^2))
    else if e == l
        2*N_est1/(B_zap*L_zap)
    else
        2*N_est1/(B_zap*L')
    = 3.62102 kgf/cm^2
# Factores de seguridad
μ := 0.4
F_D := V_est1 = 5.8048 tonnef
F_R := N_est1*μ = 216.338 tonnef
FS_D := |F_R|/|F_D| = 37.2687
M_V := |M_est1| + |V_est1*H_zap| = 124.422 tonnef*m
M_R := |N_est1*L_zap/2| + |M_est1| = 2427.62 tonnef*m
FS_V := |M_R|/|M_V| = 19.5112
chequeo(FS_D) = "CUMPLE"
chequeo(FS_V) = "CUMPLE"
# Combinación 2 (PP+SC)
N_est2 := N_zap + |N_PP| + |N_SC| = 658.94 tonnef
V_est2 := V_PP + V_SC = 4.7471 tonnef
M_est2 := M_PP + M_SC = -133.153 tonnef*m
l := L_zap/6 = 1.42667 m
e := |M_est2/N_est2| = 0.202072 m
L' := 3*(L_zap/2 - e) = 12.2338 m
σ_est2 :=
    if e < l
        max(N_est2/(B_zap*L_zap) + 6*M_est2/(B_zap*L_zap^2), N_est2/(B_zap*L_zap) - 6*M_est2/(B_zap*L_zap^2))
    else if e == l
        2*N_est2/(B_zap*L_zap)
    else
        2*N_est2/(B_zap*L')
    = 4.39411 kgf/cm^2
σ_est := max(σ_est1, σ_est2) = 4.39411 kgf/cm^2
resistencia(σ_suelo_estatico, σ_est) = "CUMPLE"
# Factores de seguridad
μ := 0.4
F_D := V_est2 = 4.7471 tonnef
F_R := N_est2*μ = 263.576 tonnef
FS_D := |F_R|/|F_D| = 55.5236
M_V := |M_est2| + |V_est2*H_zap| = 142.648 tonnef*m
M_R := |N_est2*L_zap/2| + |M_est2| = 2953.42 tonnef*m
FS_V := |M_R|/|M_V| = 20.7043
chequeo(FS_D) = "CUMPLE"
chequeo(FS_V) = "CUMPLE"
# 3.2. Combinaciones sísmicas
# Combinación 3,1 (PP+SX)
N_sis := N_zap + |N_PP| + N_SX = 757.564 tonnef
V_sis := V_PP + V_SX = 33.4074 tonnef
M_sis := M_PP + M_SX = 409.636 tonnef*m
l := L_zap/6 = 1.42667 m
e := |M_sis/N_sis| = 0.540728 m
L' := 3*(L_zap/2 - e) = 11.2178 m
σ_sis31 :=
    if e < l
        max(N_sis/(B_zap*L_zap) + 6*M_sis/(B_zap*L_zap^2), N_sis/(B_zap*L_zap) - 6*M_sis/(B_zap*L_zap^2))
    else if e == l
        2*N_sis/(B_zap*L_zap)
    else
        2*N_sis/(B_zap*L')
    = 6.10217 kgf/cm^2
# Factores de seguridad
μ := 0.4
F_D := V_sis = 33.4074 tonnef
F_R := N_sis*μ = 303.025 tonnef
FS_D := |F_R|/|F_D| = 9.07061
M_V := |M_sis| + |V_sis*H_zap| = 476.451 tonnef*m
M_R := |N_sis*L_zap/2| + |M_sis| = 3652.01 tonnef*m
FS_V := |M_R|/|M_V| = 7.66503
chequeo(FS_D) = "CUMPLE"
chequeo(FS_V) = "CUMPLE"
# Combinación 3,2 (PP-SX)
N_sis := N_zap + |N_PP| - N_SX = 324.124 tonnef
V_sis := V_PP - V_SX = -21.7978 tonnef
M_sis := M_PP - M_SX = -635.26 tonnef*m
l := L_zap/6 = 1.42667 m
e := |M_sis/N_sis| = 1.95993 m
L' := 3*(L_zap/2 - e) = 6.96022 m
σ_sis32 :=
    if e < l
        max(N_sis/(B_zap*L_zap) + 6*M_sis/(B_zap*L_zap^2), N_sis/(B_zap*L_zap) - 6*M_sis/(B_zap*L_zap^2))
    else if e == l
        2*N_sis/(B_zap*L_zap)
    else
        2*N_sis/(B_zap*L')
    = 4.65682 kgf/cm^2
# Factores de seguridad
μ := 0.4
F_D := V_sis = -21.7978 tonnef
F_R := N_sis*μ = 129.65 tonnef
FS_D := |F_R|/|F_D| = 5.94784
M_V := |M_sis| + |V_sis*H_zap| = 678.856 tonnef*m
M_R := |N_sis*L_zap/2| + |M_sis| = 2022.51 tonnef*m
FS_V := |M_R|/|M_V| = 2.9793
chequeo(FS_D) = "CUMPLE"
chequeo(FS_V) = "CUMPLE"
# Combinación 4,1 (PP+SC+S)
N_sis := N_zap + |N_PP| + |N_SC| + N_SX = 875.66 tonnef
M_sis := M_PP + M_SC + M_SX = 389.295 tonnef*m
V_sis := V_PP + V_SC + V_SX = 32.3497 tonnef
l := L_zap/6 = 1.42667 m
e := |M_sis/N_sis| = 0.444573 m
L' := 3*(L_zap/2 - e) = 11.5063 m
σ_sis41 :=
    if e < l
        max(N_sis/(B_zap*L_zap) + 6*M_sis/(B_zap*L_zap^2), N_sis/(B_zap*L_zap) - 6*M_sis/(B_zap*L_zap^2))
    else if e == l
        2*N_sis/(B_zap*L_zap)
    else
        2*N_sis/(B_zap*L')
    = 6.7087 kgf/cm^2
# Factores de seguridad
μ := 0.4
F_D := V_sis = 32.3497 tonnef
F_R := N_sis*μ = 350.264 tonnef
FS_D := |F_R|/|F_D| = 10.8274
M_V := |M_sis| + |V_sis*H_zap| = 453.994 tonnef*m
M_R := |N_sis*L_zap/2| + |M_sis| = 4137.12 tonnef*m
FS_V := |M_R|/|M_V| = 9.11272
chequeo(FS_D) = "CUMPLE"
chequeo(FS_V) = "CUMPLE"
# Combinación 4,2 (PP+SC-S)
N_sis := N_zap + |N_PP| + |N_SC| - N_SX = 442.221 tonnef
M_sis := M_PP + M_SC - M_SX = -655.602 tonnef*m
V_sis := V_PP + V_SC - V_SX = -22.8555 tonnef
l := L_zap/6 = 1.42667 m
e := |M_sis/N_sis| = 1.48252 m
L' := 3*(L_zap/2 - e) = 8.39244 m
σ_sis42 :=
    if e < l
        max(N_sis/(B_zap*L_zap) + 6*M_sis/(B_zap*L_zap^2), N_sis/(B_zap*L_zap) - 6*M_sis/(B_zap*L_zap^2))
    else if e == l
        2*N_sis/(B_zap*L_zap)
    else
        2*N_sis/(B_zap*L')
    = 5.26928 kgf/cm^2
# Factores de seguridad
μ := 0.4
F_D := V_sis = -22.8555 tonnef
F_R := N_sis*μ = 176.888 tonnef
FS_D := |F_R|/|F_D| = 7.73942
M_V := |M_sis| + |V_sis*H_zap| = 701.313 tonnef*m
M_R := |N_sis*L_zap/2| + |M_sis| = 2548.31 tonnef*m
FS_V := |M_R|/|M_V| = 3.63362
chequeo(FS_D) = "CUMPLE"
chequeo(FS_V) = "CUMPLE"
σ_sis := max(σ_sis31, σ_sis32, σ_sis41, σ_sis42) = 6.7087 kgf/cm^2
resistencia(σ_suelo_estatico, σ_est) = "CUMPLE"
# 4. Chequeo parrilla
# Momento lado corto | Momento Lado Largo
M1 := σ_sis*(B_zap/2)^2*1 m/2 = 33.5435 tonnef*m
M2 := σ_sis*((L_zap - L_muro)/2)^2*1 m/2 = 27.1702 tonnef*m
# Propiedad de la Sección de Zapata | Propiedad de la Sección de Zapata
W := 1/6*1 m*H_zap^2 = 0.666667 m^3
W := 1/6*1 m*H_zap^2 = 0.666667 m^3
M1/W = 5.03153 kgf/cm^2
M2/W = 4.07554 kgf/cm^2
if M1/W < 7 kgf/cm^2
    "No necesita parrilla"
else
    "Necesita Parrilla"
= "No necesita parrilla"
if M2/W < 7 kgf/cm^2
    "No necesita parrilla"
else
    "Necesita Parrilla"
= "No necesita parrilla"
