# Diseño de fundaciones
# MURO: F4X
σ_suelo_estatico := 8 kgf/cm^2
σ_suelo_sismico := 10 kgf/cm^2
chequeo(x) :=
    if x > 1
        "CUMPLE"
    else
        "REDISEÑAR"
# 1. Dimensiones elementos
# Propiedades y esfuerzos de muro: | Dimensiones zapata:
L_muro := 6.76 m
L_zap := 60 cm + L_muro + 60 cm = 7.96 m
e_muro := 25 cm
B_zap := 140 cm
resistencia(x, y) :=
    if x > y
        "CUMPLE"
    else
        "REDISEÑAR"
γ_H := 2.5 tonnef/m^3
H_zap := 200 cm
N_zap := γ_H*B_zap*L_zap*H_zap = 55.72 tonnef
# 2. Esfuerzos de ETABS
N_PP := -455.244 tonnef
M_PP := -112.8124 tonnef*m
V_PP := 5.8048 tonnef
N_SC := -118.0962 tonnef
M_SC := -20.3411 tonnef*m
V_SC := -1.0577 tonnef
N_SX := 216.7196 tonnef
M_SX := 522.4481 tonnef*m
V_SX := 27.6026 tonnef
N_SY := 157.9424 tonnef
M_SY := 59.8586 tonnef*m
V_SY := 8.2291 tonnef
# 3. Combinaciones
# 3.1. Combinaciones estáticas
# Combinación 1 (PP)
N_est1 := N_zap + |N_PP| = 510.964 tonnef
V_est1 := V_PP = 5.8048 tonnef
M_est1 := M_PP = -112.812 tonnef*m
l := L_zap/6 = 1.32667 m
e := |M_est1/N_est1| = 0.220783 m
L' := 3*(L_zap/2 - e) = 11.2776 m
σ_est1 :=
    if e < l
        max(N_est1/(B_zap*L_zap) + 6*M_est1/(B_zap*L_zap^2), N_est1/(B_zap*L_zap) - 6*M_est1/(B_zap*L_zap^2))
    else if e == l
        2*N_est1/(B_zap*L_zap)
    else
        2*N_est1/(B_zap*L')
    = 5.34816 kgf/cm^2
# Factores de seguridad
μ := 0.4
F_D := V_est1 = 5.8048 tonnef
F_R := N_est1*μ = 204.386 tonnef
FS_D := |F_R|/|F_D| = 35.2098
M_V := |M_est1| + |V_est1*H_zap| = 124.422 tonnef*m
M_R := |N_est1*L_zap/2| + |M_est1| = 2146.45 tonnef*m
FS_V := |M_R|/|M_V| = 17.2514
chequeo(FS_D) = "CUMPLE"
chequeo(FS_V) = "CUMPLE"
# Combinación 2 (PP+SC)
N_est2 := N_zap + |N_PP| + |N_SC| = 629.06 tonnef
V_est2 := V_PP + V_SC = 4.7471 tonnef
M_est2 := M_PP + M_SC = -133.153 tonnef*m
l := L_zap/6 = 1.32667 m
e := |M_est2/N_est2| = 0.211671 m
L' := 3*(L_zap/2 - e) = 11.305 m
σ_est2 :=
    if e < l
        max(N_est2/(B_zap*L_zap) + 6*M_est2/(B_zap*L_zap^2), N_est2/(B_zap*L_zap) - 6*M_est2/(B_zap*L_zap^2))
    else if e == l
        2*N_est2/(B_zap*L_zap)
    else
        2*N_est2/(B_zap*L')
    = 6.54547 kgf/cm^2
σ_est := max(σ_est1, σ_est2) = 6.54547 kgf/cm^2
resistencia(σ_suelo_estatico, σ_est) = "CUMPLE"
# Factores de seguridad
μ := 0.4
F_D := V_est2 = 4.7471 tonnef
F_R := N_est2*μ = 251.624 tonnef
FS_D := |F_R|/|F_D| = 53.0059
M_V := |M_est2| + |V_est2*H_zap| = 142.648 tonnef*m
M_R := |N_est2*L_zap/2| + |M_est2| = 2636.81 tonnef*m
FS_V := |M_R|/|M_V| = 18.4848
chequeo(FS_D) = "CUMPLE"
chequeo(FS_V) = "CUMPLE"
# 3.2. Combinaciones sísmicas
# Combinación 3,1 (PP+SX)
N_sis := N_zap + |N_PP| + N_SX = 727.684 tonnef
V_sis := V_PP + V_SX = 33.4074 tonnef
M_sis := M_PP + M_SX = 409.636 tonnef*m
l := L_zap/6 = 1.32667 m
e := |M_sis/N_sis| = 0.562931 m
L' := 3*(L_zap/2 - e) = 10.2512 m
σ_sis31 :=
    if e < l
        max(N_sis/(B_zap*L_zap) + 6*M_sis/(B_zap*L_zap^2), N_sis/(B_zap*L_zap) - 6*M_sis/(B_zap*L_zap^2))
    else if e == l
        2*N_sis/(B_zap*L_zap)
    else
        2*N_sis/(B_zap*L')
    = 9.30056 kgf/cm^2
# Factores de seguridad
μ := 0.4
F_D := V_sis = 33.4074 tonnef
F_R := N_sis*μ = 291.073 tonnef
FS_D := |F_R|/|F_D| = 8.71284
M_V := |M_sis| + |V_sis*H_zap| = 476.451 tonnef*m
M_R := |N_sis*L_zap/2| + |M_sis| = 3305.82 tonnef*m
FS_V := |M_R|/|M_V| = 6.93843
chequeo(FS_D) = "CUMPLE"
chequeo(FS_V) = "CUMPLE"
# Combinación 3,2 (PP-SX)
N_sis := N_zap + |N_PP| - N_SX = 294.244 tonnef
V_sis := V_PP - V_SX = -21.7978 tonnef
M_sis := M_PP - M_SX = -635.26 tonnef*m
l := L_zap/6 = 1.32667 m
e := |M_sis/N_sis| = 2.15896 m
L' := 3*(L_zap/2 - e) = 5.46313 m
σ_sis32 :=
    if e < l
        max(N_sis/(B_zap*L_zap) + 6*M_sis/(B_zap*L_zap^2), N_sis/(B_zap*L_zap) - 6*M_sis/(B_zap*L_zap^2))
    else if e == l
        2*N_sis/(B_zap*L_zap)
    else
        2*N_sis/(B_zap*L')
    = 7.69429 kgf/cm^2
# Factores de seguridad
μ := 0.4
F_D := V_sis = -21.7978 tonnef
F_R := N_sis*μ = 117.698 tonnef
FS_D := |F_R|/|F_D| = 5.39952
M_V := |M_sis| + |V_sis*H_zap| = 678.856 tonnef*m
M_R := |N_sis*L_zap/2| + |M_sis| = 1806.35 tonnef*m
FS_V := |M_R|/|M_V| = 2.66088
chequeo(FS_D) = "CUMPLE"
chequeo(FS_V) = "CUMPLE"
# Combinación 4,1 (PP+0.75(SC+S))
N_sis := N_zap + |N_PP| + 0.75*|N_SC| + 0.75*N_SX = 762.076 tonnef
M_sis := M_PP + 0.75*M_SC + 0.75*M_SX = 263.768 tonnef*m
V_sis := V_PP + 0.75*(V_SC + V_SX) = 25.7135 tonnef
l := L_zap/6 = 1.32667 m
e := |M_sis/N_sis| = 0.346118 m
L' := 3*(L_zap/2 - e) = 10.9016 m
σ_sis41 :=
    if e < l
        max(N_sis/(B_zap*L_zap) + 6*M_sis/(B_zap*L_zap^2), N_sis/(B_zap*L_zap) - 6*M_sis/(B_zap*L_zap^2))
    else if e == l
        2*N_sis/(B_zap*L_zap)
    else
        2*N_sis/(B_zap*L')
    = 8.62254 kgf/cm^2
# Factores de seguridad
μ := 0.4
F_D := V_sis = 25.7135 tonnef
F_R := N_sis*μ = 304.83 tonnef
FS_D := |F_R|/|F_D| = 11.8549
M_V := |M_sis| + |V_sis*H_zap| = 315.195 tonnef*m
M_R := |N_sis*L_zap/2| + |M_sis| = 3296.83 tonnef*m
FS_V := |M_R|/|M_V| = 10.4597
chequeo(FS_D) = "CUMPLE"
chequeo(FS_V) = "CUMPLE"
# Combinación 4,2 (PP+0.75(SC-S))
N_sis := N_zap + |N_PP| + 0.75*|N_SC| - 0.75*N_SX = 436.996 tonnef
M_sis := M_PP + 0.75*M_SC - 0.75*M_SX = -519.904 tonnef*m
V_sis := V_PP + 0.75*(V_SC - V_SX) = -15.6904 tonnef
l := L_zap/6 = 1.32667 m
e := |M_sis/N_sis| = 1.18972 m
L' := 3*(L_zap/2 - e) = 8.37083 m
σ_sis42 :=
    if e < l
        max(N_sis/(B_zap*L_zap) + 6*M_sis/(B_zap*L_zap^2), N_sis/(B_zap*L_zap) - 6*M_sis/(B_zap*L_zap^2))
    else if e == l
        2*N_sis/(B_zap*L_zap)
    else
        2*N_sis/(B_zap*L')
    = 7.43794 kgf/cm^2
# Factores de seguridad
μ := 0.4
F_D := V_sis = -15.6904 tonnef
F_R := N_sis*μ = 174.799 tonnef
FS_D := |F_R|/|F_D| = 11.1405
M_V := |M_sis| + |V_sis*H_zap| = 551.285 tonnef*m
M_R := |N_sis*L_zap/2| + |M_sis| = 2259.15 tonnef*m
FS_V := |M_R|/|M_V| = 4.09797
chequeo(FS_D) = "CUMPLE"
chequeo(FS_V) = "CUMPLE"
# Combinación 5,1 (0.6PP+SX)
N_sis := 0.6*N_zap + 0.6*|N_PP| + N_SX = 523.298 tonnef
M_sis := 0.6*M_PP + M_SX = 454.761 tonnef*m
V_sis := 0.6*V_PP + V_SX = 31.0855 tonnef
l := L_zap/6 = 1.32667 m
e := |M_sis/N_sis| = 0.869028 m
L' := 3*(L_zap/2 - e) = 9.33292 m
σ_sis51 :=
    if e < l
        max(N_sis/(B_zap*L_zap) + 6*M_sis/(B_zap*L_zap^2), N_sis/(B_zap*L_zap) - 6*M_sis/(B_zap*L_zap^2))
    else if e == l
        2*N_sis/(B_zap*L_zap)
    else
        2*N_sis/(B_zap*L')
    = 7.77174 kgf/cm^2
# Factores de seguridad
μ := 0.4
F_D := V_sis = 31.0855 tonnef
F_R := N_sis*μ = 209.319 tonnef
FS_D := |F_R|/|F_D| = 6.73366
M_V := M_sis + V_sis*H_zap = 516.932 tonnef*m
M_R := N_sis*L_zap/2 + M_sis = 2537.49 tonnef*m
FS_V := |M_R|/|M_V| = 4.90875
chequeo(FS_D) = "CUMPLE"
chequeo(FS_V) = "CUMPLE"
# Combinación 5,2 (0.6PP-SX)
N_sis := 0.6*N_zap + 0.6*|N_PP| - N_SX = 89.8588 tonnef
M_sis := 0.6*M_PP - M_SX = -590.136 tonnef*m
V_sis := 0.6*V_PP - V_SX = -24.1197 tonnef
l := L_zap/6 = 1.32667 m
e := |M_sis/N_sis| = 6.56737 m
L' := 3*(L_zap/2 - e) = -7.7621 m
σ_sis52 :=
    if e < l
        max(N_sis/(B_zap*L_zap) + 6*M_sis/(B_zap*L_zap^2), N_sis/(B_zap*L_zap) - 6*M_sis/(B_zap*L_zap^2))
    else if e == l
        2*N_sis/(B_zap*L_zap)
    else
        2*N_sis/(B_zap*L')
    = -1.6538 kgf/cm^2
# Factores de seguridad
μ := 0.4
F_D := V_sis = -24.1197 tonnef
F_R := N_sis*μ = 35.9435 tonnef
FS_D := |F_R|/|F_D| = 1.49021
M_V := M_sis + V_sis*H_zap = -638.375 tonnef*m
M_R := N_sis*L_zap/2 + M_sis = -232.498 tonnef*m
FS_V := |M_R|/|M_V| = 0.364202
chequeo(FS_D) = "CUMPLE"
chequeo(FS_V) = "REDISEÑAR"
σ_sis := max(σ_sis31, σ_sis32, σ_sis41, σ_sis42, σ_sis51, σ_sis52) = 9.30056 kgf/cm^2
resistencia(σ_suelo_estatico, σ_est) = "CUMPLE"
# 4. Chequeo parrilla
# Momento lado corto | Momento Lado Largo
M1 := σ_sis*(B_zap/2)^2*1 m/2 = 22.7864 tonnef*m
M2 := σ_sis*((L_zap - L_muro)/2)^2*1 m/2 = 16.741 tonnef*m
# Propiedad de la Sección de Zapata | Propiedad de la Sección de Zapata
W := 1/6*1 m*H_zap^2 = 0.666667 m^3
W := 1/6*1 m*H_zap^2 = 0.666667 m^3
M1/W = 3.41796 kgf/cm^2
M2/W = 2.51115 kgf/cm^2
if M1/W < 7 kgf/cm^2
    "No necesita parrilla"
else
    "Necesita Parrilla"
= "No necesita parrilla"
if M2/W < 7 kgf/cm^2
    "No necesita parrilla"
else
    "Necesita Parrilla"
= "No necesita parrilla"
